// SBML level 2 version 3

model Step1()

  // Compartments:
  compartment cell = 1;

  // Species:
  species EGF_egfr in cell = 580/cell; EGF_egfr is "EGF(egfr)";
  species EGF0_egfr in cell = 580/cell; EGF0_egfr is "EGF0(egfr)";
  species EGFR0_egf_egfr in cell = 2.2042836e-10/cell; EGFR0_egf_egfr is "EGFR0(egf,egfr)";
  species EGFR_egf_egfr_shc_0 in cell = 2.2042836e-10/cell; EGFR_egf_egfr_shc_0 is "EGFR(egf,egfr,shc~0)";
  species Shc_egfr_grb2_0 in cell = 1.0245848/cell; Shc_egfr_grb2_0 is "Shc(egfr,grb2~0)";
  species EGF_egfr_1_EGFR_egf_1_egfr_shc_0 in cell = 0.00037565071/cell; EGF_egfr_1_EGFR_egf_1_egfr_shc_0 is "EGF(egfr!1).EGFR(egf!1,egfr,shc~0)";
  species EGF0_egfr_1_EGFR0_egf_1_egfr in cell = 0.00037565071/cell; EGF0_egfr_1_EGFR0_egf_1_egfr is "EGF0(egfr!1).EGFR0(egf!1,egfr)";
  species S8 in cell = 87.613746/cell; S8 is "EGF(egfr!1).EGF0(egfr!2).EGFR(egf!1,egfr!3,shc~0).EGFR0(egf!2,egfr!3)";
  species S9 in cell = 7.2037969/cell; S9 is "EGF(egfr!1).EGF0(egfr!2).EGFR(egf!1,egfr!3,shc~P).EGFR0(egf!2,egfr!3)";
  species S10 in cell = 2.6442001/cell; S10 is "EGF(egfr!1).EGF0(egfr!2).EGFR(egf!1,egfr!3,shc~P!4).EGFR0(egf!2,egfr!3).Shc(egfr!4,grb2~0)";
  species S11 in cell = 2.5378811/cell; S11 is "EGF(egfr!1).EGF0(egfr!2).EGFR(egf!1,egfr!3,shc~P!4).EGFR0(egf!2,egfr!3).Shc(egfr!4,grb2~P)";
  species Shc_egfr_grb2_P in cell = 143.79333/cell; Shc_egfr_grb2_P is "Shc(egfr,grb2~P)";

  // Parameters:
  r3_k3f = 0.37;
  r3_k3b = 4.5;
  r14_k14f = 0.18;
  r14_k14b = 0.00331;
  Gf_LR = -8;
  Gf_RR = -1.86;
  Gf_RSh = -5.6;
  Gf_LRR = -10;
  Gf_LRRL = 1.03;
  Gf_RShP = 12;
  phi = 0.35;
  Ea_LR = 10;
  Ea_RR = 3.72;
  Ea_RSh = 4.7;
  _v1_1_local1 = exp(-(Ea_LR + phi*Gf_LR));
  _v1_2_local1 = exp(-(Ea_LR + phi*Gf_LR));
  __reverse_v1_1_local1 = exp(-(Ea_LR + (1 - phi)*(-Gf_LR)));
  __reverse_v1_2_local1 = exp(-(Ea_LR + (1 - phi)*(-Gf_LR)));
  _v2_local1 = exp(-(Ea_RR + phi*(Gf_RR + 2*Gf_LRR + Gf_LRRL)));
  __reverse_v2_local1 = exp(-(Ea_RR + (1 - phi)*(-(Gf_RR + 2*Gf_LRR + Gf_LRRL))));
  _v13_local1 = exp(-(Ea_RSh + phi*Gf_RSh));
  __reverse_v13_local1 = exp(-(Ea_RSh + (1 - phi)*(-Gf_RSh)));
  __reverse_v13_local2 = exp(-(Ea_RSh + (1 - phi)*(-Gf_RSh + (-Gf_RShP))));
  _v13_local2 = exp(-(Ea_RSh + phi*(Gf_RSh + Gf_RShP)));

  // Assignment rules:
  Dimers := S8 + S9 + S10 + S11;
  EGF_EGFR2_P := 0 + S9;
  Shc_P := 0 + Shc_egfr_grb2_P;
  EGFRPtotal := S9 + S10 + S11;
  ShPtotal := S11 + Shc_egfr_grb2_P;

  // Reactions:
  R1: EGF_egfr + EGFR_egf_egfr_shc_0 => EGF_egfr_1_EGFR_egf_1_egfr_shc_0; _v1_1_local1*EGF_egfr*EGFR_egf_egfr_shc_0;
  R2: EGF0_egfr + EGFR0_egf_egfr => EGF0_egfr_1_EGFR0_egf_1_egfr; _v1_2_local1*EGF0_egfr*EGFR0_egf_egfr;
  R3: EGF_egfr_1_EGFR_egf_1_egfr_shc_0 => EGF_egfr + EGFR_egf_egfr_shc_0; __reverse_v1_1_local1*EGF_egfr_1_EGFR_egf_1_egfr_shc_0;
  R4: EGF0_egfr_1_EGFR0_egf_1_egfr => EGF0_egfr + EGFR0_egf_egfr; __reverse_v1_2_local1*EGF0_egfr_1_EGFR0_egf_1_egfr;
  R5: EGF_egfr_1_EGFR_egf_1_egfr_shc_0 + EGF0_egfr_1_EGFR0_egf_1_egfr => S8; _v2_local1*EGF_egfr_1_EGFR_egf_1_egfr_shc_0*EGF0_egfr_1_EGFR0_egf_1_egfr;
  R6: S8 => EGF_egfr_1_EGFR_egf_1_egfr_shc_0 + EGF0_egfr_1_EGFR0_egf_1_egfr; __reverse_v2_local1*S8;
  R7: S8 => S9; r3_k3f*S8;
  R8: S9 => S8; r3_k3b*S9;
  R9: Shc_egfr_grb2_0 + S9 => S10; _v13_local1*Shc_egfr_grb2_0*S9;
  R10: S10 => Shc_egfr_grb2_0 + S9; __reverse_v13_local1*S10;
  R11: S10 => S11; r14_k14f*S10;
  R12: S11 => S9 + Shc_egfr_grb2_P; __reverse_v13_local2*S11;
  R13: S9 + Shc_egfr_grb2_P => S11; _v13_local2*S9*Shc_egfr_grb2_P;
  R14: Shc_egfr_grb2_P => Shc_egfr_grb2_0; r14_k14b*Shc_egfr_grb2_P;

  // Unit definitions:
  unit substance = item;
end
