// SBML level 2 version 3

model Step2()

  // Compartments:
  compartment cell = 1;

  // Species:
  species EGF0_egfr in cell = 580/cell; EGF0_egfr is "EGF0(egfr)";
  species EGFR0_egf_egfr in cell = 4.371172e-6/cell; EGFR0_egf_egfr is "EGFR0(egf,egfr)";
  species EGF_egfr in cell = 580/cell; EGF_egfr is "EGF(egfr)";
  species EGFR_egf_egfr_grb2_0_shc_0 in cell = 4.371172e-6/cell; EGFR_egf_egfr_grb2_0_shc_0 is "EGFR(egf,egfr,grb2~0,shc~0)";
  species Shc_egfr_grb2_0 in cell = 1.1119773/cell; Shc_egfr_grb2_0 is "Shc(egfr,grb2~0)";
  species Grb2_SH2_sos in cell = 38.366815/cell; Grb2_SH2_sos is "Grb2(SH2,sos)";
  species SOS_grb2 in cell = 1.7095188/cell; SOS_grb2 is "SOS(grb2)";
  species S8 in cell = 7.5570513/cell; S8 is "EGF(egfr!1).EGFR(egf!1,egfr,grb2~0,shc~0)";
  species EGF0_egfr_1_EGFR0_egf_1_egfr in cell = 7.5570513/cell; EGF0_egfr_1_EGFR0_egf_1_egfr is "EGF0(egfr!1).EGFR0(egf!1,egfr)";
  species Grb2_SH2_sos_1_SOS_grb2_1 in cell = 24.128734/cell; Grb2_SH2_sos_1_SOS_grb2_1 is "Grb2(SH2,sos!1).SOS(grb2!1)";
  species S11 in cell = 57.100952/cell; S11 is "EGF(egfr!1).EGF0(egfr!2).EGFR(egf!1,egfr!3,grb2~0,shc~0).EGFR0(egf!2,egfr!3)";
  species S12 in cell = 4.6949629/cell; S12 is "EGF(egfr!1).EGF0(egfr!2).EGFR(egf!1,egfr!3,grb2~0,shc~P).EGFR0(egf!2,egfr!3)";
  species S13 in cell = 3.9943391/cell; S13 is "EGF(egfr!1).EGF0(egfr!2).EGFR(egf!1,egfr!3,grb2~P,shc~0).EGFR0(egf!2,egfr!3)";
  species S14 in cell = 0.32842337/cell; S14 is "EGF(egfr!1).EGF0(egfr!2).EGFR(egf!1,egfr!3,grb2~P,shc~P).EGFR0(egf!2,egfr!3)";
  species S15 in cell = 1.8703037/cell; S15 is "EGF(egfr!1).EGF0(egfr!2).EGFR(egf!1,egfr!3,grb2~0,shc~P!4).EGFR0(egf!2,egfr!3).Shc(egfr!4,grb2~0)";
  species S16 in cell = 12.529164/cell; S16 is "EGF(egfr!1).EGF0(egfr!2).EGFR(egf!1,egfr!3,grb2~P!4,shc~0).EGFR0(egf!2,egfr!3).Grb2(SH2!4,sos)";
  species S17 in cell = 7.1297484/cell; S17 is "EGF(egfr!1).EGF0(egfr!2).EGFR(egf!1,egfr!3,grb2~P!4,shc~0).EGFR0(egf!2,egfr!3).Grb2(SH2!4,sos!5).SOS(grb2!5)";
  species S18 in cell = 1.030176/cell; S18 is "EGF(egfr!1).EGF0(egfr!2).EGFR(egf!1,egfr!3,grb2~P!4,shc~P).EGFR0(egf!2,egfr!3).Grb2(SH2!4,sos)";
  species S19 in cell = 0.58622392/cell; S19 is "EGF(egfr!1).EGF0(egfr!2).EGFR(egf!1,egfr!3,grb2~P!4,shc~P).EGFR0(egf!2,egfr!3).Grb2(SH2!4,sos!5).SOS(grb2!5)";
  species S20 in cell = 0.13083254/cell; S20 is "EGF(egfr!1).EGF0(egfr!2).EGFR(egf!1,egfr!3,grb2~P,shc~P!4).EGFR0(egf!2,egfr!3).Shc(egfr!4,grb2~0)";
  species S21 in cell = 1.6997765/cell; S21 is "EGF(egfr!1).EGF0(egfr!2).EGFR(egf!1,egfr!3,grb2~0,shc~P!4).EGFR0(egf!2,egfr!3).Shc(egfr!4,grb2~P)";
  species S22 in cell = 0.1189036/cell; S22 is "EGF(egfr!1).EGF0(egfr!2).EGFR(egf!1,egfr!3,grb2~P,shc~P!4).EGFR0(egf!2,egfr!3).Shc(egfr!4,grb2~P)";
  species S23 in cell = 0.41039199/cell; S23 is "EGF(egfr!1).EGF0(egfr!2).EGFR(egf!1,egfr!3,grb2~P!4,shc~P!5).EGFR0(egf!2,egfr!3).Grb2(SH2!4,sos).Shc(egfr!5,grb2~0)";
  species S24 in cell = 0.23353446/cell; S24 is "EGF(egfr!1).EGF0(egfr!2).EGFR(egf!1,egfr!3,grb2~P!4,shc~P!5).EGFR0(egf!2,egfr!3).Grb2(SH2!4,sos!6).SOS(grb2!6).Shc(egfr!5,grb2~0)";
  species Shc_egfr_grb2_P in cell = 143.83907/cell; Shc_egfr_grb2_P is "Shc(egfr,grb2~P)";
  species S26 in cell = 0.37297172/cell; S26 is "EGF(egfr!1).EGF0(egfr!2).EGFR(egf!1,egfr!3,grb2~P!4,shc~P!5).EGFR0(egf!2,egfr!3).Grb2(SH2!4,sos).Shc(egfr!5,grb2~P)";
  species S27 in cell = 0.21224037/cell; S27 is "EGF(egfr!1).EGF0(egfr!2).EGFR(egf!1,egfr!3,grb2~P!4,shc~P!5).EGFR0(egf!2,egfr!3).Grb2(SH2!4,sos!6).SOS(grb2!6).Shc(egfr!5,grb2~P)";

  // Parameters:
  r3_k3f_1 = 0.37;
  r3_k3b_1 = 4.5;
  r3_k3f_2 = 0.07;
  r3_k3b_2 = 1;
  r14_k14f = 0.18;
  r14_k14b = 0.00331;
  Gf_LR = -8;
  Gf_RR = -1.86;
  Gf_RSh = -5.6;
  Gf_RG = 2.5;
  Gf_GS = 1;
  Gf_LRR = -10;
  Gf_LRRL = 1.03;
  Gf_RShP = 12;
  Gf_RGS = 0.1;
  phi = 0.35;
  Ea_LR = 10;
  Ea_RR = 3.72;
  Ea_RSh = 4.7;
  Ea_GS = 1;
  Ea_RG = 5;
  _v1_1_local1 = exp(-(Ea_LR + phi*Gf_LR));
  _v1_2_local1 = exp(-(Ea_LR + phi*Gf_LR));
  _v12_local1 = exp(-(Ea_GS + phi*Gf_GS));
  __reverse_v1_1_local1 = exp(-(Ea_LR + (1 - phi)*(-Gf_LR)));
  __reverse_v1_2_local1 = exp(-(Ea_LR + (1 - phi)*(-Gf_LR)));
  _v2_local1 = exp(-Ea_RR);
  __reverse_v12_local1 = exp(-(Ea_GS + (1 - phi)*(-Gf_GS)));
  __reverse_v2_local1 = exp(-Ea_RR);
  _v13_local1 = exp(-(Ea_RSh + phi*Gf_RSh));
  _v9_local1 = exp(-(Ea_RG + phi*Gf_RG));
  _v9_local2 = exp(-(Ea_RG + phi*(Gf_RG + Gf_RGS)));
  __reverse_v13_local1 = exp(-(Ea_RSh + (1 - phi)*(-Gf_RSh)));
  __reverse_v9_local1 = exp(-(Ea_RG + (1 - phi)*(-Gf_RG)));
  __reverse_v9_local2 = exp(-(Ea_RG + (1 - phi)*(-Gf_RG + (-Gf_RGS))));
  _v12_local2 = exp(-(Ea_GS + phi*(Gf_GS + Gf_RGS)));
  __reverse_v12_local2 = exp(-(Ea_GS + (1 - phi)*(-Gf_GS + (-Gf_RGS))));
  __reverse_v13_local2 = exp(-(Ea_RSh + (1 - phi)*(-Gf_RSh + (-Gf_RShP))));
  _v13_local2 = exp(-(Ea_RSh + phi*(Gf_RSh + Gf_RShP)));

  // Assignment rules:
  Dimers := S11 + S12 + S13 + S14 + S15 + S16 + S17 + S18 + S19 + S20 + S21 + S22 + S23 + S24 + S26 + S27;
  EGF_EGFR2_P := S12 + S13 + 2*S14 + S18 + S19 + S20 + S22;
  Shc_P := 0 + Shc_egfr_grb2_P;
  EGFRPtotal := S12 + S13 + 2*S14 + S15 + S16 + S17 + 2*S18 + 2*S19 + 2*S20 + S21 + 2*S22 + 2*S23 + 2*S24 + 2*S26 + 2*S27;
  ShPtotal := S21 + S22 + Shc_egfr_grb2_P + S26 + S27;
  Grb2EGFRtotal := S16 + S17 + S18 + S19 + S23 + S24 + S26 + S27;

  // Reactions:
  R1: EGF_egfr + EGFR_egf_egfr_grb2_0_shc_0 => S8; _v1_1_local1*EGF_egfr*EGFR_egf_egfr_grb2_0_shc_0;
  R2: EGF0_egfr + EGFR0_egf_egfr => EGF0_egfr_1_EGFR0_egf_1_egfr; _v1_2_local1*EGF0_egfr*EGFR0_egf_egfr;
  R3: Grb2_SH2_sos + SOS_grb2 => Grb2_SH2_sos_1_SOS_grb2_1; _v12_local1*Grb2_SH2_sos*SOS_grb2;
  R4: S8 => EGF_egfr + EGFR_egf_egfr_grb2_0_shc_0; __reverse_v1_1_local1*S8;
  R5: EGF0_egfr_1_EGFR0_egf_1_egfr => EGF0_egfr + EGFR0_egf_egfr; __reverse_v1_2_local1*EGF0_egfr_1_EGFR0_egf_1_egfr;
  R6: S8 + EGF0_egfr_1_EGFR0_egf_1_egfr => S11; _v2_local1*S8*EGF0_egfr_1_EGFR0_egf_1_egfr;
  R7: Grb2_SH2_sos_1_SOS_grb2_1 => Grb2_SH2_sos + SOS_grb2; __reverse_v12_local1*Grb2_SH2_sos_1_SOS_grb2_1;
  R8: S11 => S8 + EGF0_egfr_1_EGFR0_egf_1_egfr; __reverse_v2_local1*S11;
  R9: S11 => S12; r3_k3f_1*S11;
  R10: S11 => S13; r3_k3f_2*S11;
  R11: S13 => S14; r3_k3f_1*S13;
  R12: S12 => S14; r3_k3f_2*S12;
  R13: S12 => S11; r3_k3b_1*S12;
  R14: S13 => S11; r3_k3b_2*S13;
  R15: Shc_egfr_grb2_0 + S12 => S15; _v13_local1*Shc_egfr_grb2_0*S12;
  R16: Grb2_SH2_sos + S13 => S16; _v9_local1*Grb2_SH2_sos*S13;
  R17: Grb2_SH2_sos_1_SOS_grb2_1 + S13 => S17; _v9_local2*Grb2_SH2_sos_1_SOS_grb2_1*S13;
  R18: S16 => S18; r3_k3f_1*S16;
  R19: S17 => S19; r3_k3f_1*S17;
  R20: S15 => S20; r3_k3f_2*S15;
  R21: S14 => S13; r3_k3b_1*S14;
  R22: S14 => S12; r3_k3b_2*S14;
  R23: Shc_egfr_grb2_0 + S14 => S20; _v13_local1*Shc_egfr_grb2_0*S14;
  R24: S15 => Shc_egfr_grb2_0 + S12; __reverse_v13_local1*S15;
  R25: S15 => S21; r14_k14f*S15;
  R26: Grb2_SH2_sos + S14 => S18; _v9_local1*Grb2_SH2_sos*S14;
  R27: Grb2_SH2_sos_1_SOS_grb2_1 + S14 => S19; _v9_local2*Grb2_SH2_sos_1_SOS_grb2_1*S14;
  R28: S16 => Grb2_SH2_sos + S13; __reverse_v9_local1*S16;
  R29: S17 => Grb2_SH2_sos_1_SOS_grb2_1 + S13; __reverse_v9_local2*S17;
  R30: SOS_grb2 + S16 => S17; _v12_local2*SOS_grb2*S16;
  R31: S17 => SOS_grb2 + S16; __reverse_v12_local2*S17;
  R32: S21 => S22; r3_k3f_2*S21;
  R33: S18 => S16; r3_k3b_1*S18;
  R34: S19 => S17; r3_k3b_1*S19;
  R35: S20 => S15; r3_k3b_2*S20;
  R36: Shc_egfr_grb2_0 + S18 => S23; _v13_local1*Shc_egfr_grb2_0*S18;
  R37: Shc_egfr_grb2_0 + S19 => S24; _v13_local1*Shc_egfr_grb2_0*S19;
  R38: S20 => Shc_egfr_grb2_0 + S14; __reverse_v13_local1*S20;
  R39: S21 => S12 + Shc_egfr_grb2_P; __reverse_v13_local2*S21;
  R40: S20 => S22; r14_k14f*S20;
  R41: Grb2_SH2_sos + S20 => S23; _v9_local1*Grb2_SH2_sos*S20;
  R42: Grb2_SH2_sos_1_SOS_grb2_1 + S20 => S24; _v9_local2*Grb2_SH2_sos_1_SOS_grb2_1*S20;
  R43: S18 => Grb2_SH2_sos + S14; __reverse_v9_local1*S18;
  R44: S19 => Grb2_SH2_sos_1_SOS_grb2_1 + S14; __reverse_v9_local2*S19;
  R45: SOS_grb2 + S18 => S19; _v12_local2*SOS_grb2*S18;
  R46: S19 => SOS_grb2 + S18; __reverse_v12_local2*S19;
  R47: S22 => S21; r3_k3b_2*S22;
  R48: S12 + Shc_egfr_grb2_P => S21; _v13_local2*S12*Shc_egfr_grb2_P;
  R49: S14 + Shc_egfr_grb2_P => S22; _v13_local2*S14*Shc_egfr_grb2_P;
  R50: S18 + Shc_egfr_grb2_P => S26; _v13_local2*S18*Shc_egfr_grb2_P;
  R51: S19 + Shc_egfr_grb2_P => S27; _v13_local2*S19*Shc_egfr_grb2_P;
  R52: S22 => S14 + Shc_egfr_grb2_P; __reverse_v13_local2*S22;
  R53: S23 => Shc_egfr_grb2_0 + S18; __reverse_v13_local1*S23;
  R54: S24 => Shc_egfr_grb2_0 + S19; __reverse_v13_local1*S24;
  R55: S23 => S26; r14_k14f*S23;
  R56: S24 => S27; r14_k14f*S24;
  R57: Shc_egfr_grb2_P => Shc_egfr_grb2_0; r14_k14b*Shc_egfr_grb2_P;
  R58: Grb2_SH2_sos + S22 => S26; _v9_local1*Grb2_SH2_sos*S22;
  R59: Grb2_SH2_sos_1_SOS_grb2_1 + S22 => S27; _v9_local2*Grb2_SH2_sos_1_SOS_grb2_1*S22;
  R60: S23 => Grb2_SH2_sos + S20; __reverse_v9_local1*S23;
  R61: S24 => Grb2_SH2_sos_1_SOS_grb2_1 + S20; __reverse_v9_local2*S24;
  R62: SOS_grb2 + S23 => S24; _v12_local2*SOS_grb2*S23;
  R63: S24 => SOS_grb2 + S23; __reverse_v12_local2*S24;
  R64: S26 => S18 + Shc_egfr_grb2_P; __reverse_v13_local2*S26;
  R65: S27 => S19 + Shc_egfr_grb2_P; __reverse_v13_local2*S27;
  R66: S26 => Grb2_SH2_sos + S22; __reverse_v9_local1*S26;
  R67: S27 => Grb2_SH2_sos_1_SOS_grb2_1 + S22; __reverse_v9_local2*S27;
  R68: SOS_grb2 + S26 => S27; _v12_local2*SOS_grb2*S26;
  R69: S27 => SOS_grb2 + S26; __reverse_v12_local2*S27;

  // Unit definitions:
  unit substance = item;
end
