// SBML level 2 version 3

model Step3()

  // Compartments:
  compartment cell = 1;

  // Species:
  species EGF0_egfr in cell = 580/cell; EGF0_egfr is "EGF0(egfr)";
  species EGFR0_egf_egfr in cell = 4.8978497e-6/cell; EGFR0_egf_egfr is "EGFR0(egf,egfr)";
  species EGF_egfr in cell = 580/cell; EGF_egfr is "EGF(egfr)";
  species EGFR_egf_egfr_grb2_0_shc_0 in cell = 4.8978497e-6/cell; EGFR_egf_egfr_grb2_0_shc_0 is "EGFR(egf,egfr,grb2~0,shc~0)";
  species Shc_egfr_grb2_0 in cell = 0.61882511/cell; Shc_egfr_grb2_0 is "Shc(egfr,grb2~0)";
  species Grb2_SH2_sos in cell = 2.1059205/cell; Grb2_SH2_sos is "Grb2(SH2,sos)";
  species SOS_grb2 in cell = 15.08076/cell; SOS_grb2 is "SOS(grb2)";
  species S8 in cell = 8.4682632/cell; S8 is "EGF(egfr!1).EGFR(egf!1,egfr,grb2~0,shc~0)";
  species EGF0_egfr_1_EGFR0_egf_1_egfr in cell = 8.4682632/cell; EGF0_egfr_1_EGFR0_egf_1_egfr is "EGF0(egfr!1).EGFR0(egf!1,egfr)";
  species Grb2_SH2_sos_1_SOS_grb2_1 in cell = 11.683681/cell; Grb2_SH2_sos_1_SOS_grb2_1 is "Grb2(SH2,sos!1).SOS(grb2!1)";
  species S11 in cell = 71.713059/cell; S11 is "EGF(egfr!1).EGF0(egfr!2).EGFR(egf!1,egfr!3,grb2~0,shc~0).EGFR0(egf!2,egfr!3)";
  species S12 in cell = 5.8964109/cell; S12 is "EGF(egfr!1).EGF0(egfr!2).EGFR(egf!1,egfr!3,grb2~0,shc~P).EGFR0(egf!2,egfr!3)";
  species S13 in cell = 5.0205138/cell; S13 is "EGF(egfr!1).EGF0(egfr!2).EGFR(egf!1,egfr!3,grb2~P,shc~0).EGFR0(egf!2,egfr!3)";
  species S14 in cell = 0.41279803/cell; S14 is "EGF(egfr!1).EGF0(egfr!2).EGFR(egf!1,egfr!3,grb2~P,shc~P).EGFR0(egf!2,egfr!3)";
  species S15 in cell = 1.3072429/cell; S15 is "EGF(egfr!1).EGF0(egfr!2).EGFR(egf!1,egfr!3,grb2~0,shc~P!4).EGFR0(egf!2,egfr!3).Shc(egfr!4,grb2~0)";
  species S16 in cell = 0.87070493/cell; S16 is "EGF(egfr!1).EGF0(egfr!2).EGFR(egf!1,egfr!3,grb2~P!4,shc~0).EGFR0(egf!2,egfr!3).Grb2(SH2!4,sos)";
  species S17 in cell = 4.3708732/cell; S17 is "EGF(egfr!1).EGF0(egfr!2).EGFR(egf!1,egfr!3,grb2~P!4,shc~0).EGFR0(egf!2,egfr!3).Grb2(SH2!4,sos!5).SOS(grb2!5)";
  species S18 in cell = 0.07159133/cell; S18 is "EGF(egfr!1).EGF0(egfr!2).EGFR(egf!1,egfr!3,grb2~P!4,shc~P).EGFR0(egf!2,egfr!3).Grb2(SH2!4,sos)";
  species S19 in cell = 0.35938308/cell; S19 is "EGF(egfr!1).EGF0(egfr!2).EGFR(egf!1,egfr!3,grb2~P!4,shc~P).EGFR0(egf!2,egfr!3).Grb2(SH2!4,sos!5).SOS(grb2!5)";
  species S20 in cell = 0.091517889/cell; S20 is "EGF(egfr!1).EGF0(egfr!2).EGFR(egf!1,egfr!3,grb2~P,shc~P!4).EGFR0(egf!2,egfr!3).Shc(egfr!4,grb2~0)";
  species S21 in cell = 1.1122599/cell; S21 is "EGF(egfr!1).EGF0(egfr!2).EGFR(egf!1,egfr!3,grb2~0,shc~P!4).EGFR0(egf!2,egfr!3).Shc(egfr!4,grb2~P)";
  species S22 in cell = 0.077867465/cell; S22 is "EGF(egfr!1).EGF0(egfr!2).EGFR(egf!1,egfr!3,grb2~P,shc~P!4).EGFR0(egf!2,egfr!3).Shc(egfr!4,grb2~P)";
  species S23 in cell = 0.01587186/cell; S23 is "EGF(egfr!1).EGF0(egfr!2).EGFR(egf!1,egfr!3,grb2~P!4,shc~P!5).EGFR0(egf!2,egfr!3).Grb2(SH2!4,sos).Shc(egfr!5,grb2~0)";
  species S24 in cell = 0.079675541/cell; S24 is "EGF(egfr!1).EGF0(egfr!2).EGFR(egf!1,egfr!3,grb2~P!4,shc~P!5).EGFR0(egf!2,egfr!3).Grb2(SH2!4,sos!6).SOS(grb2!6).Shc(egfr!5,grb2~0)";
  species Shc_egfr_grb2_P in cell = 81.25768/cell; Shc_egfr_grb2_P is "Shc(egfr,grb2~P)";
  species S26 in cell = 0.042719782/cell; S26 is "EGF(egfr!1).EGF0(egfr!2).EGFR(egf!1,egfr!3,grb2~0,shc~P!4).EGFR0(egf!2,egfr!3).Grb2(SH2!5,sos).Shc(egfr!4,grb2~P!5)";
  species S27 in cell = 0.0016034616/cell; S27 is "EGF(egfr!1).EGF0(egfr!2).EGFR(egf!1,egfr!3,grb2~0,shc~P!4).EGFR0(egf!2,egfr!3).Grb2(SH2!5,sos!6).SOS(grb2!6).Shc(egfr!4,grb2~P!5)";
  species S28 in cell = 0.0029907408/cell; S28 is "EGF(egfr!1).EGF0(egfr!2).EGFR(egf!1,egfr!3,grb2~P,shc~P!4).EGFR0(egf!2,egfr!3).Grb2(SH2!5,sos).Shc(egfr!4,grb2~P!5)";
  species S29 in cell = 0.00011225568/cell; S29 is "EGF(egfr!1).EGF0(egfr!2).EGFR(egf!1,egfr!3,grb2~P,shc~P!4).EGFR0(egf!2,egfr!3).Grb2(SH2!5,sos!6).SOS(grb2!6).Shc(egfr!4,grb2~P!5)";
  species S30 in cell = 0.013504495/cell; S30 is "EGF(egfr!1).EGF0(egfr!2).EGFR(egf!1,egfr!3,grb2~P!4,shc~P!5).EGFR0(egf!2,egfr!3).Grb2(SH2!4,sos).Shc(egfr!5,grb2~P)";
  species S31 in cell = 0.06779155/cell; S31 is "EGF(egfr!1).EGF0(egfr!2).EGFR(egf!1,egfr!3,grb2~P!4,shc~P!5).EGFR0(egf!2,egfr!3).Grb2(SH2!4,sos!6).SOS(grb2!6).Shc(egfr!5,grb2~P)";
  species Grb2_SH2_1_sos_Shc_egfr_grb2_P_1 in cell = 62.953796/cell; Grb2_SH2_1_sos_Shc_egfr_grb2_P_1 is "Grb2(SH2!1,sos).Shc(egfr,grb2~P!1)";
  species S33 in cell = 2.3533017/cell; S33 is "Grb2(SH2!1,sos!2).SOS(grb2!2).Shc(egfr,grb2~P!1)";
  species S34 in cell = 0.00051868191/cell; S34 is "EGF(egfr!1).EGF0(egfr!2).EGFR(egf!1,egfr!3,grb2~P!4,shc~P!5).EGFR0(egf!2,egfr!3).Grb2(SH2!6,sos).Grb2(SH2!4,sos).Shc(egfr!5,grb2~P!6)";
  species S35 in cell = 0.0026037441/cell; S35 is "EGF(egfr!1).EGF0(egfr!2).EGFR(egf!1,egfr!3,grb2~P!4,shc~P!5).EGFR0(egf!2,egfr!3).Grb2(SH2!4,sos!6).Grb2(SH2!7,sos).SOS(grb2!6).Shc(egfr!5,grb2~P!7)";
  species S36 in cell = 1.9468417e-5/cell; S36 is "EGF(egfr!1).EGF0(egfr!2).EGFR(egf!1,egfr!3,grb2~P!4,shc~P!5).EGFR0(egf!2,egfr!3).Grb2(SH2!6,sos!7).Grb2(SH2!4,sos).SOS(grb2!7).Shc(egfr!5,grb2~P!6)";
  species S37 in cell = 9.7729986e-5/cell; S37 is "EGF(egfr!1).EGF0(egfr!2).EGFR(egf!1,egfr!3,grb2~P!4,shc~P!5).EGFR0(egf!2,egfr!3).Grb2(SH2!6,sos!7).Grb2(SH2!4,sos!8).SOS(grb2!7).SOS(grb2!8).Shc(egfr!5,grb2~P!6)";

  // Parameters:
  r3_k3f_1 = 0.37;
  r3_k3b_1 = 4.5;
  r3_k3f_2 = 0.07;
  r3_k3b_2 = 1;
  r14_k14f = 0.18;
  r14_k14b = 0.00331;
  Gf_LR = -8;
  Gf_RR = -1.86;
  Gf_RSh = -5.6;
  Gf_RG = 2.5;
  Gf_GS = 1;
  Gf_ShG = 1;
  Gf_LRR = -10;
  Gf_LRRL = 1.03;
  Gf_RShP = 12;
  Gf_RGS = 0.1;
  Gf_RShG = 15;
  Gf_ShGS = 5;
  phi = 0.35;
  Ea_LR = 10;
  Ea_RR = 3.72;
  Ea_RSh = 4.7;
  Ea_GS = 1;
  Ea_RG = 5;
  Ea_ShG = -3;
  _v1_1_local1 = exp(-(Ea_LR + phi*Gf_LR));
  _v1_2_local1 = exp(-(Ea_LR + phi*Gf_LR));
  _v12_local1 = exp(-(Ea_GS + phi*Gf_GS));
  __reverse_v1_1_local1 = exp(-(Ea_LR + (1 - phi)*(-Gf_LR)));
  __reverse_v1_2_local1 = exp(-(Ea_LR + (1 - phi)*(-Gf_LR)));
  _v2_local1 = exp(-Ea_RR);
  __reverse_v12_local1 = exp(-(Ea_GS + (1 - phi)*(-Gf_GS)));
  __reverse_v2_local1 = exp(-Ea_RR);
  _v13_local1 = exp(-(Ea_RSh + phi*Gf_RSh));
  _v9_local1 = exp(-(Ea_RG + phi*Gf_RG));
  _v9_local2 = exp(-(Ea_RG + phi*(Gf_RG + Gf_RGS)));
  __reverse_v13_local1 = exp(-(Ea_RSh + (1 - phi)*(-Gf_RSh)));
  __reverse_v9_local1 = exp(-(Ea_RG + (1 - phi)*(-Gf_RG)));
  __reverse_v9_local2 = exp(-(Ea_RG + (1 - phi)*(-Gf_RG + (-Gf_RGS))));
  _v12_local2 = exp(-(Ea_GS + phi*(Gf_GS + Gf_RGS)));
  __reverse_v12_local2 = exp(-(Ea_GS + (1 - phi)*(-Gf_GS + (-Gf_RGS))));
  __reverse_v13_local2 = exp(-(Ea_RSh + (1 - phi)*(-Gf_RSh + (-Gf_RShP))));
  _v21_local1 = exp(-(Ea_ShG + phi*(-Gf_RShP + Gf_ShG + Gf_RShG)));
  _v21_local2 = exp(-(Ea_ShG + phi*(-Gf_RShP + Gf_ShG + Gf_RShG + Gf_ShGS)));
  _v13_local2 = exp(-(Ea_RSh + phi*(Gf_RSh + Gf_RShP)));
  __reverse_v13_local3 = exp(-(Ea_RSh + (1 - phi)*(-Gf_RSh + (-Gf_RShG))));
  _v12_local3 = exp(-(Ea_GS + phi*(Gf_GS + Gf_ShGS)));
  __reverse_v12_local3 = exp(-(Ea_GS + (1 - phi)*(-Gf_GS + (-Gf_ShGS))));
  _v21_local3 = exp(-(Ea_ShG + phi*Gf_ShG));
  _v21_local4 = exp(-(Ea_ShG + phi*(Gf_ShG + Gf_ShGS)));
  __reverse_v21_local1 = exp(-(Ea_ShG + (1 - phi)*(Gf_RShP + (-Gf_ShG) + (-Gf_RShG))));
  __reverse_v21_local2 = exp(-(Ea_ShG + (1 - phi)*(Gf_RShP + (-Gf_ShG) + (-Gf_RShG) + (-Gf_ShGS))));
  _v13_local3 = exp(-(Ea_RSh + phi*(Gf_RSh + Gf_RShG)));
  __reverse_v21_local3 = exp(-(Ea_ShG + (1 - phi)*(-Gf_ShG)));
  __reverse_v21_local4 = exp(-(Ea_ShG + (1 - phi)*(-Gf_ShG + (-Gf_ShGS))));

  // Assignment rules:
  Dimers := S11 + S12 + S13 + S14 + S15 + S16 + S17 + S18 + S19 + S20 + S21 + S22 + S23 + S24 + S26 + S27 + S28 + S29 + S30 + S31 + S34 + S35 + S36 + S37;
  EGF_EGFR2_P := S12 + S13 + 2*S14 + S18 + S19 + S20 + S22 + S28 + S29;
  Shc_P := 0 + Shc_egfr_grb2_P;
  EGFRPtotal := S12 + S13 + 2*S14 + S15 + S16 + S17 + 2*S18 + 2*S19 + 2*S20 + S21 + 2*S22 + 2*S23 + 2*S24 + S26 + S27 + 2*S28 + 2*S29 + 2*S30 + 2*S31 + 2*S34 + 2*S35 + 2*S36 + 2*S37;
  ShPtotal := S21 + S22 + Shc_egfr_grb2_P + S26 + S27 + S28 + S29 + S30 + S31 + Grb2_SH2_1_sos_Shc_egfr_grb2_P_1 + S33 + S34 + S35 + S36 + S37;
  Grb2EGFRtotal := S16 + S17 + S18 + S19 + S23 + S24 + S26 + S27 + S28 + S29 + S30 + S31 + 2*S34 + 2*S35 + 2*S36 + 2*S37;
  Grb2Shctotal := S26 + S27 + S28 + S29 + Grb2_SH2_1_sos_Shc_egfr_grb2_P_1 + S33 + S34 + S35 + S36 + S37;

  // Reactions:
  R1: EGF_egfr + EGFR_egf_egfr_grb2_0_shc_0 => S8; _v1_1_local1*EGF_egfr*EGFR_egf_egfr_grb2_0_shc_0;
  R2: EGF0_egfr + EGFR0_egf_egfr => EGF0_egfr_1_EGFR0_egf_1_egfr; _v1_2_local1*EGF0_egfr*EGFR0_egf_egfr;
  R3: Grb2_SH2_sos + SOS_grb2 => Grb2_SH2_sos_1_SOS_grb2_1; _v12_local1*Grb2_SH2_sos*SOS_grb2;
  R4: S8 => EGF_egfr + EGFR_egf_egfr_grb2_0_shc_0; __reverse_v1_1_local1*S8;
  R5: EGF0_egfr_1_EGFR0_egf_1_egfr => EGF0_egfr + EGFR0_egf_egfr; __reverse_v1_2_local1*EGF0_egfr_1_EGFR0_egf_1_egfr;
  R6: S8 + EGF0_egfr_1_EGFR0_egf_1_egfr => S11; _v2_local1*S8*EGF0_egfr_1_EGFR0_egf_1_egfr;
  R7: Grb2_SH2_sos_1_SOS_grb2_1 => Grb2_SH2_sos + SOS_grb2; __reverse_v12_local1*Grb2_SH2_sos_1_SOS_grb2_1;
  R8: S11 => S8 + EGF0_egfr_1_EGFR0_egf_1_egfr; __reverse_v2_local1*S11;
  R9: S11 => S12; r3_k3f_1*S11;
  R10: S11 => S13; r3_k3f_2*S11;
  R11: S13 => S14; r3_k3f_1*S13;
  R12: S12 => S14; r3_k3f_2*S12;
  R13: S12 => S11; r3_k3b_1*S12;
  R14: S13 => S11; r3_k3b_2*S13;
  R15: Shc_egfr_grb2_0 + S12 => S15; _v13_local1*Shc_egfr_grb2_0*S12;
  R16: Grb2_SH2_sos + S13 => S16; _v9_local1*Grb2_SH2_sos*S13;
  R17: Grb2_SH2_sos_1_SOS_grb2_1 + S13 => S17; _v9_local2*Grb2_SH2_sos_1_SOS_grb2_1*S13;
  R18: S16 => S18; r3_k3f_1*S16;
  R19: S17 => S19; r3_k3f_1*S17;
  R20: S15 => S20; r3_k3f_2*S15;
  R21: S14 => S13; r3_k3b_1*S14;
  R22: S14 => S12; r3_k3b_2*S14;
  R23: Shc_egfr_grb2_0 + S14 => S20; _v13_local1*Shc_egfr_grb2_0*S14;
  R24: S15 => Shc_egfr_grb2_0 + S12; __reverse_v13_local1*S15;
  R25: S15 => S21; r14_k14f*S15;
  R26: Grb2_SH2_sos + S14 => S18; _v9_local1*Grb2_SH2_sos*S14;
  R27: Grb2_SH2_sos_1_SOS_grb2_1 + S14 => S19; _v9_local2*Grb2_SH2_sos_1_SOS_grb2_1*S14;
  R28: S16 => Grb2_SH2_sos + S13; __reverse_v9_local1*S16;
  R29: S17 => Grb2_SH2_sos_1_SOS_grb2_1 + S13; __reverse_v9_local2*S17;
  R30: SOS_grb2 + S16 => S17; _v12_local2*SOS_grb2*S16;
  R31: S17 => SOS_grb2 + S16; __reverse_v12_local2*S17;
  R32: S21 => S22; r3_k3f_2*S21;
  R33: S18 => S16; r3_k3b_1*S18;
  R34: S19 => S17; r3_k3b_1*S19;
  R35: S20 => S15; r3_k3b_2*S20;
  R36: Shc_egfr_grb2_0 + S18 => S23; _v13_local1*Shc_egfr_grb2_0*S18;
  R37: Shc_egfr_grb2_0 + S19 => S24; _v13_local1*Shc_egfr_grb2_0*S19;
  R38: S20 => Shc_egfr_grb2_0 + S14; __reverse_v13_local1*S20;
  R39: S21 => S12 + Shc_egfr_grb2_P; __reverse_v13_local2*S21;
  R40: S20 => S22; r14_k14f*S20;
  R41: Grb2_SH2_sos + S20 => S23; _v9_local1*Grb2_SH2_sos*S20;
  R42: Grb2_SH2_sos_1_SOS_grb2_1 + S20 => S24; _v9_local2*Grb2_SH2_sos_1_SOS_grb2_1*S20;
  R43: S18 => Grb2_SH2_sos + S14; __reverse_v9_local1*S18;
  R44: S19 => Grb2_SH2_sos_1_SOS_grb2_1 + S14; __reverse_v9_local2*S19;
  R45: SOS_grb2 + S18 => S19; _v12_local2*SOS_grb2*S18;
  R46: S19 => SOS_grb2 + S18; __reverse_v12_local2*S19;
  R47: Grb2_SH2_sos + S21 => S26; _v21_local1*Grb2_SH2_sos*S21;
  R48: Grb2_SH2_sos_1_SOS_grb2_1 + S21 => S27; _v21_local2*Grb2_SH2_sos_1_SOS_grb2_1*S21;
  R49: S26 => S28; r3_k3f_2*S26;
  R50: S27 => S29; r3_k3f_2*S27;
  R51: S22 => S21; r3_k3b_2*S22;
  R52: S12 + Shc_egfr_grb2_P => S21; _v13_local2*S12*Shc_egfr_grb2_P;
  R53: S14 + Shc_egfr_grb2_P => S22; _v13_local2*S14*Shc_egfr_grb2_P;
  R54: S18 + Shc_egfr_grb2_P => S30; _v13_local2*S18*Shc_egfr_grb2_P;
  R55: S19 + Shc_egfr_grb2_P => S31; _v13_local2*S19*Shc_egfr_grb2_P;
  R56: S22 => S14 + Shc_egfr_grb2_P; __reverse_v13_local2*S22;
  R57: S23 => Shc_egfr_grb2_0 + S18; __reverse_v13_local1*S23;
  R58: S24 => Shc_egfr_grb2_0 + S19; __reverse_v13_local1*S24;
  R59: S26 => S12 + Grb2_SH2_1_sos_Shc_egfr_grb2_P_1; __reverse_v13_local3*S26;
  R60: S27 => S12 + S33; __reverse_v13_local3*S27;
  R61: S23 => S30; r14_k14f*S23;
  R62: S24 => S31; r14_k14f*S24;
  R63: Shc_egfr_grb2_P => Shc_egfr_grb2_0; r14_k14b*Shc_egfr_grb2_P;
  R64: Grb2_SH2_sos + S22 => S30; _v9_local1*Grb2_SH2_sos*S22;
  R65: Grb2_SH2_sos_1_SOS_grb2_1 + S22 => S31; _v9_local2*Grb2_SH2_sos_1_SOS_grb2_1*S22;
  R66: S23 => Grb2_SH2_sos + S20; __reverse_v9_local1*S23;
  R67: S24 => Grb2_SH2_sos_1_SOS_grb2_1 + S20; __reverse_v9_local2*S24;
  R68: SOS_grb2 + S23 => S24; _v12_local2*SOS_grb2*S23;
  R69: SOS_grb2 + S26 => S27; _v12_local3*SOS_grb2*S26;
  R70: S24 => SOS_grb2 + S23; __reverse_v12_local2*S24;
  R71: S27 => SOS_grb2 + S26; __reverse_v12_local3*S27;
  R72: Grb2_SH2_sos + S22 => S28; _v21_local1*Grb2_SH2_sos*S22;
  R73: Grb2_SH2_sos + Shc_egfr_grb2_P => Grb2_SH2_1_sos_Shc_egfr_grb2_P_1; _v21_local3*Grb2_SH2_sos*Shc_egfr_grb2_P;
  R74: Grb2_SH2_sos_1_SOS_grb2_1 + S22 => S29; _v21_local2*Grb2_SH2_sos_1_SOS_grb2_1*S22;
  R75: Grb2_SH2_sos_1_SOS_grb2_1 + Shc_egfr_grb2_P => S33; _v21_local4*Grb2_SH2_sos_1_SOS_grb2_1*Shc_egfr_grb2_P;
  R76: S26 => Grb2_SH2_sos + S21; __reverse_v21_local1*S26;
  R77: S27 => Grb2_SH2_sos_1_SOS_grb2_1 + S21; __reverse_v21_local2*S27;
  R78: S28 => S26; r3_k3b_2*S28;
  R79: S29 => S27; r3_k3b_2*S29;
  R80: S12 + Grb2_SH2_1_sos_Shc_egfr_grb2_P_1 => S26; _v13_local3*S12*Grb2_SH2_1_sos_Shc_egfr_grb2_P_1;
  R81: S14 + Grb2_SH2_1_sos_Shc_egfr_grb2_P_1 => S28; _v13_local3*S14*Grb2_SH2_1_sos_Shc_egfr_grb2_P_1;
  R82: S18 + Grb2_SH2_1_sos_Shc_egfr_grb2_P_1 => S34; _v13_local3*S18*Grb2_SH2_1_sos_Shc_egfr_grb2_P_1;
  R83: S19 + Grb2_SH2_1_sos_Shc_egfr_grb2_P_1 => S35; _v13_local3*S19*Grb2_SH2_1_sos_Shc_egfr_grb2_P_1;
  R84: S12 + S33 => S27; _v13_local3*S12*S33;
  R85: S14 + S33 => S29; _v13_local3*S14*S33;
  R86: S18 + S33 => S36; _v13_local3*S18*S33;
  R87: S19 + S33 => S37; _v13_local3*S19*S33;
  R88: S28 => S14 + Grb2_SH2_1_sos_Shc_egfr_grb2_P_1; __reverse_v13_local3*S28;
  R89: S29 => S14 + S33; __reverse_v13_local3*S29;
  R90: S30 => S18 + Shc_egfr_grb2_P; __reverse_v13_local2*S30;
  R91: S31 => S19 + Shc_egfr_grb2_P; __reverse_v13_local2*S31;
  R92: Grb2_SH2_sos + S28 => S34; _v9_local1*Grb2_SH2_sos*S28;
  R93: Grb2_SH2_sos + S29 => S36; _v9_local1*Grb2_SH2_sos*S29;
  R94: Grb2_SH2_sos_1_SOS_grb2_1 + S28 => S35; _v9_local2*Grb2_SH2_sos_1_SOS_grb2_1*S28;
  R95: Grb2_SH2_sos_1_SOS_grb2_1 + S29 => S37; _v9_local2*Grb2_SH2_sos_1_SOS_grb2_1*S29;
  R96: S30 => Grb2_SH2_sos + S22; __reverse_v9_local1*S30;
  R97: S31 => Grb2_SH2_sos_1_SOS_grb2_1 + S22; __reverse_v9_local2*S31;
  R98: SOS_grb2 + S28 => S29; _v12_local3*SOS_grb2*S28;
  R99: SOS_grb2 + S30 => S31; _v12_local2*SOS_grb2*S30;
  R100: SOS_grb2 + Grb2_SH2_1_sos_Shc_egfr_grb2_P_1 => S33; _v12_local3*SOS_grb2*Grb2_SH2_1_sos_Shc_egfr_grb2_P_1;
  R101: S29 => SOS_grb2 + S28; __reverse_v12_local3*S29;
  R102: S31 => SOS_grb2 + S30; __reverse_v12_local2*S31;
  R103: S33 => SOS_grb2 + Grb2_SH2_1_sos_Shc_egfr_grb2_P_1; __reverse_v12_local3*S33;
  R104: Grb2_SH2_sos + S30 => S34; _v21_local1*Grb2_SH2_sos*S30;
  R105: Grb2_SH2_sos + S31 => S35; _v21_local1*Grb2_SH2_sos*S31;
  R106: Grb2_SH2_sos_1_SOS_grb2_1 + S30 => S36; _v21_local2*Grb2_SH2_sos_1_SOS_grb2_1*S30;
  R107: Grb2_SH2_sos_1_SOS_grb2_1 + S31 => S37; _v21_local2*Grb2_SH2_sos_1_SOS_grb2_1*S31;
  R108: S28 => Grb2_SH2_sos + S22; __reverse_v21_local1*S28;
  R109: S29 => Grb2_SH2_sos_1_SOS_grb2_1 + S22; __reverse_v21_local2*S29;
  R110: Grb2_SH2_1_sos_Shc_egfr_grb2_P_1 => Grb2_SH2_sos + Shc_egfr_grb2_P; __reverse_v21_local3*Grb2_SH2_1_sos_Shc_egfr_grb2_P_1;
  R111: S33 => Grb2_SH2_sos_1_SOS_grb2_1 + Shc_egfr_grb2_P; __reverse_v21_local4*S33;
  R112: S34 => S18 + Grb2_SH2_1_sos_Shc_egfr_grb2_P_1; __reverse_v13_local3*S34;
  R113: S35 => S19 + Grb2_SH2_1_sos_Shc_egfr_grb2_P_1; __reverse_v13_local3*S35;
  R114: S36 => S18 + S33; __reverse_v13_local3*S36;
  R115: S37 => S19 + S33; __reverse_v13_local3*S37;
  R116: S34 => Grb2_SH2_sos + S28; __reverse_v9_local1*S34;
  R117: S35 => Grb2_SH2_sos_1_SOS_grb2_1 + S28; __reverse_v9_local2*S35;
  R118: S36 => Grb2_SH2_sos + S29; __reverse_v9_local1*S36;
  R119: S37 => Grb2_SH2_sos_1_SOS_grb2_1 + S29; __reverse_v9_local2*S37;
  R120: SOS_grb2 + S34 => S36; _v12_local3*SOS_grb2*S34;
  R121: SOS_grb2 + S34 => S35; _v12_local2*SOS_grb2*S34;
  R122: SOS_grb2 + S35 => S37; _v12_local3*SOS_grb2*S35;
  R123: SOS_grb2 + S36 => S37; _v12_local2*SOS_grb2*S36;
  R124: S35 => SOS_grb2 + S34; __reverse_v12_local2*S35;
  R125: S36 => SOS_grb2 + S34; __reverse_v12_local3*S36;
  R126: S37 => SOS_grb2 + S35; __reverse_v12_local3*S37;
  R127: S37 => SOS_grb2 + S36; __reverse_v12_local2*S37;
  R128: S34 => Grb2_SH2_sos + S30; __reverse_v21_local1*S34;
  R129: S35 => Grb2_SH2_sos + S31; __reverse_v21_local1*S35;
  R130: S36 => Grb2_SH2_sos_1_SOS_grb2_1 + S30; __reverse_v21_local2*S36;
  R131: S37 => Grb2_SH2_sos_1_SOS_grb2_1 + S31; __reverse_v21_local2*S37;

  // Unit definitions:
  unit substance = item;
end
