// SBML level 2 version 3

model Step4_DB()

  // Compartments:
  compartment cell = 1;

  // Species:
  species EGF_egfr in cell = 680/cell; EGF_egfr is "EGF(egfr)";
  species EGFR_egf_egfr_grb2_p_0_plcg_shc in cell = 100/cell; EGFR_egf_egfr_grb2_p_0_plcg_shc is "EGFR(egf,egfr,grb2,p~0,plcg,shc)";
  species Shc_egfr_grb2_p_0 in cell = 150/cell; Shc_egfr_grb2_p_0 is "Shc(egfr,grb2,p~0)";
  species Grb2_egfr_shc_sos in cell = 85/cell; Grb2_egfr_shc_sos is "Grb2(egfr,shc,sos)";
  species SOS_grb2 in cell = 34/cell; SOS_grb2 is "SOS(grb2)";
  species PLCg_egfr_p_0_p_i_0 in cell = 105/cell; PLCg_egfr_p_0_p_i_0 is "PLCg(egfr,p~0,p_i~0)";
  species S7 in cell = 0; S7 is "EGF(egfr!1).EGFR(egf!1,egfr,grb2,p~0,plcg,shc)";
  species Grb2_egfr_shc_sos_1_SOS_grb2_1 in cell = 0; Grb2_egfr_shc_sos_1_SOS_grb2_1 is "Grb2(egfr,shc,sos!1).SOS(grb2!1)";
  species S9 in cell = 0; S9 is "EGFR(egf,egfr!1,grb2,p~0,plcg,shc).EGFR(egf,egfr!1,grb2,p~0,plcg,shc)";
  species S10 in cell = 0; S10 is "EGF(egfr!1).EGFR(egf!1,egfr,grb2,p~P,plcg,shc)";
  species S11 in cell = 0; S11 is "EGF(egfr!1).EGFR(egf!1,egfr,grb2,p~P,plcg!2,shc).PLCg(egfr!2,p~0,p_i~0)";
  species S12 in cell = 0; S12 is "EGF(egfr!1).EGFR(egf!1,egfr,grb2!2,p~P,plcg,shc).Grb2(egfr!2,shc,sos)";
  species S13 in cell = 0; S13 is "EGF(egfr!1).EGFR(egf!1,egfr,grb2!2,p~P,plcg,shc).Grb2(egfr!2,shc,sos!3).SOS(grb2!3)";
  species S14 in cell = 0; S14 is "EGF(egfr!1).EGFR(egf!1,egfr,grb2,p~P,plcg,shc!2).Shc(egfr!2,grb2,p~0)";
  species S15 in cell = 0; S15 is "EGF(egfr!1).EGFR(egf!1,egfr,grb2,p~P,plcg!2,shc).PLCg(egfr!2,p~P,p_i~0)";
  species S16 in cell = 0; S16 is "EGF(egfr!1).EGFR(egf!1,egfr,grb2,p~P,plcg,shc!2).Shc(egfr!2,grb2,p~P)";
  species PLCg_egfr_p_P_p_i_0 in cell = 0; PLCg_egfr_p_P_p_i_0 is "PLCg(egfr,p~P,p_i~0)";
  species Shc_egfr_grb2_p_P in cell = 0; Shc_egfr_grb2_p_P is "Shc(egfr,grb2,p~P)";
  species S19 in cell = 0; S19 is "EGF(egfr!1).EGFR(egf!1,egfr,grb2,p~P,plcg,shc!2).Grb2(egfr,shc!3,sos).Shc(egfr!2,grb2!3,p~P)";
  species S20 in cell = 0; S20 is "EGF(egfr!1).EGFR(egf!1,egfr,grb2,p~P,plcg,shc!2).Grb2(egfr,shc!3,sos!4).SOS(grb2!4).Shc(egfr!2,grb2!3,p~P)";
  species S21 in cell = 0; S21 is "Grb2(egfr,shc!1,sos).Shc(egfr,grb2!1,p~P)";
  species S22 in cell = 0; S22 is "Grb2(egfr,shc!1,sos!2).SOS(grb2!2).Shc(egfr,grb2!1,p~P)";
  species PLCg_egfr_p_P_p_i_I in cell = 0; PLCg_egfr_p_P_p_i_I is "PLCg(egfr,p~P,p_i~I)";

  // Parameters:
  r1_k1f = 0.003;
  r1_k1b = 0.06;
  r2_k2f = 0.01;
  r2_k2b = 0.1;
  r3_k3f = 1;
  r3_k3b = 0.01;
  r4_V4 = 450;
  r4_K4 = 50;
  r5_k5f = 0.06;
  r5_k5b = 0.2;
  r6_k6f = 1;
  r6_k6b = 0.05;
  r7_k7f = 0.3;
  r7_k7b = 0.006;
  r8_V8 = 1;
  r8_K8 = 100;
  r9_k9f = 0.003;
  r9_k9b = 0.05;
  r10_k10f = 0.01;
  r10_k10b = 0.06;
  r11_k11f = 0.03;
  r11_k11b = 0.0045;
  r12_k12f = 0.0015;
  r13_k13f = 0.09;
  r13_k13b = 0.6;
  r14_k14f = 6;
  r14_k14b = 0.06;
  r15_k15f = 0.3;
  r15_k15b = 0.0009;
  r16_V16 = 1.7;
  r16_K16 = 340;
  r17_k17f = 0.003;
  r17_k17b = 0.1;
  r18_k18f = 0.3;
  r18_k18b = 0.0009;
  r19_k19f = 0.01;
  r19_k19b = 0.0214;
  r20_k20f = 0.12;
  r20_k20b = 0.00024;
  r21_k21f = 0.003;
  r22_k22f = 0.03;
  r23_k23f = 0.1;
  r24_k24f = 0.009;
  r25_k25f = 1;
  r25_k25b = 0.03;
  EGFR0 = 100;
  Shc0 = 150;
  Grb0 = 85;
  PLCg0 = 105;
  r12_k12b = r9_k9f*r10_k10f*r11_k11f*r12_k12f/(r9_k9b*r10_k10b*r11_k11b);
  r21_k21b = r15_k15f*r21_k21f*r17_k17b*r18_k18b/(r15_k15b*r17_k17f*r18_k18f);
  r22_k22b = r18_k18f*r22_k22f*r19_k19b*r20_k20b/(r18_k18b*r19_k19f*r20_k20f);
  r23_k23b = r12_k12f*r22_k22f*r21_k21f*r23_k23f/(r12_k12b*r22_k22b*r21_k21b);
  r24_k24b = r15_k15b*r20_k20f*r23_k23f*r24_k24f/(r15_k15f*r20_k20b*r23_k23b);
  _rateLaw1 = 2*r2_k2f;
  _rateLaw2 = 0.5*r2_k2b;
  _rateLaw3 = 0.5*r3_k3f;

  // Assignment rules:
  EGF_EGFR2_P := 0 + S10;
  Shc_P := 0 + Shc_egfr_grb2_p_P;
  PLCg_P := 0 + PLCg_egfr_p_P_p_i_0;
  EGFRPtotal := 2*S10 + 2*S11 + 2*S12 + 2*S13 + 2*S14 + 2*S15 + 2*S16 + 2*S19 + 2*S20;
  ShPtotal := S16 + Shc_egfr_grb2_p_P + S19 + S20 + S21 + S22;
  Grb2EGFRtotal := S12 + S13 + S19 + S20;
  Grb2Shctotal := S19 + S20 + S21 + S22;
  PLCgPtotal := S15 + PLCg_egfr_p_P_p_i_0;
  fRate3 := r4_V4/(EGF_EGFR2_P + r4_K4);
  fRate15 := r16_V16/(Shc_P + r16_K16);
  frate7 := r8_V8/(PLCg_P + r8_K8);

  // Reactions:
  R1: EGF_egfr + EGFR_egf_egfr_grb2_p_0_plcg_shc => S7; r1_k1f*EGF_egfr*EGFR_egf_egfr_grb2_p_0_plcg_shc;
  R2: Grb2_egfr_shc_sos + SOS_grb2 => Grb2_egfr_shc_sos_1_SOS_grb2_1; r12_k12b*Grb2_egfr_shc_sos*SOS_grb2;
  R3: S7 => EGF_egfr + EGFR_egf_egfr_grb2_p_0_plcg_shc; r1_k1b*S7;
  R4: S7 + S7 => S9; 0.5*_rateLaw1*S7*S7;
  R5: Grb2_egfr_shc_sos_1_SOS_grb2_1 => Grb2_egfr_shc_sos + SOS_grb2; r12_k12f*Grb2_egfr_shc_sos_1_SOS_grb2_1;
  R6: S9 => S7 + S7; 2*_rateLaw2*S9;
  R7: S9 => S10; 2*_rateLaw3*S9;
  R8: S10 => S9; r3_k3b*S10;
  R9: S10 => S9; fRate3*S10;
  R10: PLCg_egfr_p_0_p_i_0 + S10 => S11; r5_k5f*PLCg_egfr_p_0_p_i_0*S10;
  R11: Grb2_egfr_shc_sos + S10 => S12; r9_k9f*Grb2_egfr_shc_sos*S10;
  R12: Grb2_egfr_shc_sos_1_SOS_grb2_1 + S10 => S13; r11_k11b*Grb2_egfr_shc_sos_1_SOS_grb2_1*S10;
  R13: Shc_egfr_grb2_p_0 + S10 => S14; r13_k13f*Shc_egfr_grb2_p_0*S10;
  R14: S11 => PLCg_egfr_p_0_p_i_0 + S10; r5_k5b*S11;
  R15: S11 => S15; r6_k6f*S11;
  R16: S12 => Grb2_egfr_shc_sos + S10; r9_k9b*S12;
  R17: SOS_grb2 + S12 => S13; r10_k10f*SOS_grb2*S12;
  R18: S13 => SOS_grb2 + S12; r10_k10b*S13;
  R19: S13 => Grb2_egfr_shc_sos_1_SOS_grb2_1 + S10; r11_k11f*S13;
  R20: S14 => Shc_egfr_grb2_p_0 + S10; r13_k13b*S14;
  R21: S14 => S16; r14_k14f*S14;
  R22: S15 => S11; r6_k6b*S15;
  R23: S15 => S10 + PLCg_egfr_p_P_p_i_0; r7_k7f*S15;
  R24: S16 => S14; r14_k14b*S16;
  R25: S16 => S10 + Shc_egfr_grb2_p_P; r15_k15f*S16;
  R26: Grb2_egfr_shc_sos + S16 => S19; r17_k17f*Grb2_egfr_shc_sos*S16;
  R27: Grb2_egfr_shc_sos_1_SOS_grb2_1 + S16 => S20; r24_k24f*Grb2_egfr_shc_sos_1_SOS_grb2_1*S16;
  R28: S10 + PLCg_egfr_p_P_p_i_0 => S15; r7_k7b*S10*PLCg_egfr_p_P_p_i_0;
  R29: PLCg_egfr_p_P_p_i_0 => PLCg_egfr_p_0_p_i_0; frate7*PLCg_egfr_p_P_p_i_0;
  R30: S10 + Shc_egfr_grb2_p_P => S16; r15_k15b*S10*Shc_egfr_grb2_p_P;
  R31: Shc_egfr_grb2_p_P => Shc_egfr_grb2_p_0; fRate15*Shc_egfr_grb2_p_P;
  R32: S19 => Grb2_egfr_shc_sos + S16; r17_k17b*S19;
  R33: S19 => S10 + S21; r18_k18f*S19;
  R34: SOS_grb2 + S19 => S20; r19_k19f*SOS_grb2*S19;
  R35: S20 => SOS_grb2 + S19; r19_k19b*S20;
  R36: S20 => S10 + S22; r20_k20f*S20;
  R37: Grb2_egfr_shc_sos + Shc_egfr_grb2_p_P => S21; r21_k21f*Grb2_egfr_shc_sos*Shc_egfr_grb2_p_P;
  R38: Grb2_egfr_shc_sos_1_SOS_grb2_1 + Shc_egfr_grb2_p_P => S22; r23_k23b*Grb2_egfr_shc_sos_1_SOS_grb2_1*Shc_egfr_grb2_p_P;
  R39: S20 => Grb2_egfr_shc_sos_1_SOS_grb2_1 + S16; r24_k24b*S20;
  R40: PLCg_egfr_p_P_p_i_0 => PLCg_egfr_p_P_p_i_I; r25_k25f*PLCg_egfr_p_P_p_i_0;
  R41: S10 + S21 => S19; r18_k18b*S10*S21;
  R42: S10 + S22 => S20; r20_k20b*S10*S22;
  R43: S21 => Grb2_egfr_shc_sos + Shc_egfr_grb2_p_P; r21_k21b*S21;
  R44: SOS_grb2 + S21 => S22; r22_k22f*SOS_grb2*S21;
  R45: S22 => SOS_grb2 + S21; r22_k22b*S22;
  R46: S22 => Grb2_egfr_shc_sos_1_SOS_grb2_1 + Shc_egfr_grb2_p_P; r23_k23f*S22;
  R47: PLCg_egfr_p_P_p_i_I => PLCg_egfr_p_P_p_i_0; r25_k25b*PLCg_egfr_p_P_p_i_I;

  // Unit definitions:
  unit substance = item;
end
