// SBML level 2 version 3

model Step5_newGfLRR()

  // Compartments:
  compartment cell = 1;

  // Species:
  species EGF_egfr in cell = 680/cell; EGF_egfr is "EGF(egfr)";
  species EGFR_egf_egfr_grb2_p_0_plcg_shc in cell = 100/cell; EGFR_egf_egfr_grb2_p_0_plcg_shc is "EGFR(egf,egfr,grb2,p~0,plcg,shc)";
  species Shc_egfr_grb2_p_0 in cell = 150/cell; Shc_egfr_grb2_p_0 is "Shc(egfr,grb2,p~0)";
  species Grb2_egfr_shc_sos in cell = 85/cell; Grb2_egfr_shc_sos is "Grb2(egfr,shc,sos)";
  species SOS_grb2 in cell = 34/cell; SOS_grb2 is "SOS(grb2)";
  species PLCg_egfr_p_0_p_i_0 in cell = 105/cell; PLCg_egfr_p_0_p_i_0 is "PLCg(egfr,p~0,p_i~0)";
  species S7 in cell = 0; S7 is "EGF(egfr!1).EGFR(egf!1,egfr,grb2,p~0,plcg,shc)";
  species S8 in cell = 0; S8 is "EGFR(egf,egfr!1,grb2,p~0,plcg,shc).EGFR(egf,egfr!1,grb2,p~0,plcg,shc)";
  species S9 in cell = 0; S9 is "EGF(egfr!1).EGFR(egf!1,egfr,grb2,p~P,plcg,shc)";
  species S10 in cell = 0; S10 is "EGF(egfr!1).EGFR(egf!1,egfr,grb2,p~P,plcg,shc!2).Shc(egfr!2,grb2,p~0)";
  species S11 in cell = 0; S11 is "EGF(egfr!1).EGFR(egf!1,egfr,grb2!2,p~P,plcg,shc).Grb2(egfr!2,shc,sos)";
  species S12 in cell = 0; S12 is "EGF(egfr!1).EGFR(egf!1,egfr,grb2,p~P,plcg!2,shc).PLCg(egfr!2,p~0,p_i~0)";
  species S13 in cell = 0; S13 is "EGF(egfr!1).EGFR(egf!1,egfr,grb2,p~0,plcg,shc!2).Shc(egfr!2,grb2,p~P)";
  species S14 in cell = 0; S14 is "EGF(egfr!1).EGFR(egf!1,egfr,grb2!2,p~P,plcg,shc).Grb2(egfr!2,shc,sos!3).SOS(grb2!3)";
  species S15 in cell = 0; S15 is "EGF(egfr!1).EGFR(egf!1,egfr,grb2,p~P,plcg!2,shc).PLCg(egfr!2,p~P,p_i~0)";
  species S16 in cell = 0; S16 is "EGF(egfr!1).EGFR(egf!1,egfr,grb2,p~P,plcg!2,shc!3).PLCg(egfr!2,p~0,p_i~0).Shc(egfr!3,grb2,p~P)";
  species S17 in cell = 0; S17 is "EGF(egfr!1).EGFR(egf!1,egfr,grb2,p~P,plcg!2,shc!3).PLCg(egfr!2,p~P,p_i~0).Shc(egfr!3,grb2,p~0)";
  species S18 in cell = 0; S18 is "EGF(egfr!1).EGFR(egf!1,egfr,grb2!2,p~P,plcg,shc!3).Grb2(egfr!2,shc,sos).Shc(egfr!3,grb2,p~0)";
  species S19 in cell = 0; S19 is "EGF(egfr!1).EGFR(egf!1,egfr,grb2!2,p~P,plcg,shc!3).Grb2(egfr!2,shc,sos).Shc(egfr!3,grb2,p~P)";
  species S20 in cell = 0; S20 is "EGF(egfr!1).EGFR(egf!1,egfr,grb2!2,p~P,plcg!3,shc).Grb2(egfr!2,shc,sos).PLCg(egfr!3,p~0,p_i~0)";
  species S21 in cell = 0; S21 is "EGF(egfr!1).EGFR(egf!1,egfr,grb2!2,p~P,plcg!3,shc).Grb2(egfr!2,shc,sos).PLCg(egfr!3,p~P,p_i~0)";
  species Shc_egfr_grb2_p_P in cell = 0; Shc_egfr_grb2_p_P is "Shc(egfr,grb2,p~P)";
  species Grb2_egfr_shc_sos_1_SOS_grb2_1 in cell = 0; Grb2_egfr_shc_sos_1_SOS_grb2_1 is "Grb2(egfr,shc,sos!1).SOS(grb2!1)";
  species S24 in cell = 0; S24 is "EGF(egfr!1).EGFR(egf!1,egfr,grb2!2,p~P,plcg,shc!3).Grb2(egfr!2,shc,sos!4).SOS(grb2!4).Shc(egfr!3,grb2,p~0)";
  species S25 in cell = 0; S25 is "EGF(egfr!1).EGFR(egf!1,egfr,grb2!2,p~P,plcg,shc!3).Grb2(egfr!2,shc,sos!4).SOS(grb2!4).Shc(egfr!3,grb2,p~P)";
  species S26 in cell = 0; S26 is "EGF(egfr!1).EGFR(egf!1,egfr,grb2!2,p~P,plcg!3,shc).Grb2(egfr!2,shc,sos!4).PLCg(egfr!3,p~0,p_i~0).SOS(grb2!4)";
  species S27 in cell = 0; S27 is "EGF(egfr!1).EGFR(egf!1,egfr,grb2!2,p~P,plcg!3,shc).Grb2(egfr!2,shc,sos!4).PLCg(egfr!3,p~P,p_i~0).SOS(grb2!4)";
  species PLCg_egfr_p_P_p_i_0 in cell = 0; PLCg_egfr_p_P_p_i_0 is "PLCg(egfr,p~P,p_i~0)";
  species S29 in cell = 0; S29 is "EGF(egfr!1).EGFR(egf!1,egfr,grb2,p~P,plcg,shc!2).Shc(egfr!2,grb2,p~P)";
  species S30 in cell = 0; S30 is "Grb2(egfr,shc!1,sos).Shc(egfr,grb2!1,p~P)";
  species S31 in cell = 0; S31 is "Grb2(egfr,shc!1,sos!2).SOS(grb2!2).Shc(egfr,grb2!1,p~P)";
  species PLCg_egfr_p_0_p_i_I in cell = 0; PLCg_egfr_p_0_p_i_I is "PLCg(egfr,p~0,p_i~I)";
  species S33 in cell = 0; S33 is "EGF(egfr!1).EGFR(egf!1,egfr,grb2,p~P,plcg!2,shc!3).PLCg(egfr!2,p~P,p_i~0).Shc(egfr!3,grb2,p~P)";
  species S34 in cell = 0; S34 is "EGF(egfr!1).EGFR(egf!1,egfr,grb2,p~P,plcg,shc!2).Grb2(egfr,shc!3,sos).Shc(egfr!2,grb2!3,p~P)";
  species S35 in cell = 0; S35 is "EGF(egfr!1).EGFR(egf!1,egfr,grb2,p~P,plcg,shc!2).Grb2(egfr,shc!3,sos!4).SOS(grb2!4).Shc(egfr!2,grb2!3,p~P)";
  species S36 in cell = 0; S36 is "EGF(egfr!1).EGFR(egf!1,egfr,grb2,p~0,plcg,shc!2).Grb2(egfr,shc!3,sos).Shc(egfr!2,grb2!3,p~P)";
  species S37 in cell = 0; S37 is "EGF(egfr!1).EGFR(egf!1,egfr,grb2,p~0,plcg,shc!2).Grb2(egfr,shc!3,sos!4).SOS(grb2!4).Shc(egfr!2,grb2!3,p~P)";
  species S38 in cell = 0; S38 is "Grb2(egfr,shc!1,sos).Shc(egfr,grb2!1,p~0)";
  species S39 in cell = 0; S39 is "Grb2(egfr,shc!1,sos!2).SOS(grb2!2).Shc(egfr,grb2!1,p~0)";
  species S40 in cell = 0; S40 is "EGF(egfr!1).EGFR(egf!1,egfr,grb2!2,p~P,plcg,shc).Grb2(egfr!2,shc!3,sos).Shc(egfr,grb2!3,p~P)";
  species S41 in cell = 0; S41 is "EGF(egfr!1).EGFR(egf!1,egfr,grb2!2,p~P,plcg,shc).Grb2(egfr!2,shc!3,sos!4).SOS(grb2!4).Shc(egfr,grb2!3,p~P)";
  species S42 in cell = 0; S42 is "EGF(egfr!1).EGFR(egf!1,egfr,grb2,p~P,plcg,shc!2).Grb2(egfr,shc!3,sos).Shc(egfr!2,grb2!3,p~0)";
  species S43 in cell = 0; S43 is "EGF(egfr!1).EGFR(egf!1,egfr,grb2,p~P,plcg,shc!2).Grb2(egfr,shc!3,sos!4).SOS(grb2!4).Shc(egfr!2,grb2!3,p~0)";
  species S44 in cell = 0; S44 is "EGF(egfr!1).EGF(egfr!2).EGFR(egf!1,egfr,grb2!3,p~P,plcg,shc).EGFR(egf!2,egfr,grb2,p~P,plcg,shc!4).Grb2(egfr!3,shc!5,sos).Shc(egfr!4,grb2!5,p~P)";
  species S45 in cell = 0; S45 is "EGF(egfr!1).EGF(egfr!2).EGFR(egf!1,egfr,grb2!3,p~P,plcg,shc).EGFR(egf!2,egfr,grb2,p~P,plcg,shc!4).Grb2(egfr!3,shc!5,sos!6).SOS(grb2!6).Shc(egfr!4,grb2!5,p~P)";
  species S46 in cell = 0; S46 is "EGF(egfr!1).EGF(egfr!2).EGFR(egf!2,egfr,grb2!3,p~P,plcg,shc).EGFR(egf!1,egfr,grb2,p~0,plcg,shc!4).Grb2(egfr!3,shc!5,sos).Shc(egfr!4,grb2!5,p~P)";
  species S47 in cell = 0; S47 is "EGF(egfr!1).EGF(egfr!2).EGFR(egf!2,egfr,grb2!3,p~P,plcg,shc).EGFR(egf!1,egfr,grb2,p~0,plcg,shc!4).Grb2(egfr!3,shc!5,sos!6).SOS(grb2!6).Shc(egfr!4,grb2!5,p~P)";
  species S48 in cell = 0; S48 is "EGF(egfr!1).EGFR(egf!1,egfr,grb2!2,p~P,plcg,shc).Grb2(egfr!2,shc!3,sos).Shc(egfr,grb2!3,p~0)";
  species S49 in cell = 0; S49 is "EGF(egfr!1).EGFR(egf!1,egfr,grb2!2,p~P,plcg,shc).Grb2(egfr!2,shc!3,sos!4).SOS(grb2!4).Shc(egfr,grb2!3,p~0)";
  species S50 in cell = 0; S50 is "EGF(egfr!1).EGFR(egf!1,egfr,grb2,p~P,plcg!2,shc!3).Grb2(egfr,shc!4,sos).PLCg(egfr!2,p~P,p_i~0).Shc(egfr!3,grb2!4,p~P)";
  species S51 in cell = 0; S51 is "EGF(egfr!1).EGFR(egf!1,egfr,grb2,p~P,plcg!2,shc!3).Grb2(egfr,shc!4,sos!5).PLCg(egfr!2,p~P,p_i~0).SOS(grb2!5).Shc(egfr!3,grb2!4,p~P)";
  species S52 in cell = 0; S52 is "EGF(egfr!1).EGFR(egf!1,egfr,grb2!2,p~P,plcg,shc!3).Grb2(egfr!2,shc,sos).Grb2(egfr,shc!4,sos).Shc(egfr!3,grb2!4,p~P)";
  species S53 in cell = 0; S53 is "EGF(egfr!1).EGFR(egf!1,egfr,grb2!2,p~P,plcg,shc!3).Grb2(egfr!2,shc,sos!4).Grb2(egfr,shc!5,sos).SOS(grb2!4).Shc(egfr!3,grb2!5,p~P)";
  species S54 in cell = 0; S54 is "EGF(egfr!1).EGFR(egf!1,egfr,grb2!2,p~P,plcg,shc!3).Grb2(egfr!2,shc,sos).Grb2(egfr,shc!4,sos!5).SOS(grb2!5).Shc(egfr!3,grb2!4,p~P)";
  species S55 in cell = 0; S55 is "EGF(egfr!1).EGFR(egf!1,egfr,grb2!2,p~P,plcg,shc!3).Grb2(egfr!2,shc,sos!4).Grb2(egfr,shc!5,sos!6).SOS(grb2!6).SOS(grb2!4).Shc(egfr!3,grb2!5,p~P)";
  species S56 in cell = 0; S56 is "EGF(egfr!1).EGFR(egf!1,egfr,grb2!2,p~P,plcg,shc!3).Grb2(egfr!2,shc!4,sos).Shc(egfr!3,grb2,p~P).Shc(egfr,grb2!4,p~P)";
  species S57 in cell = 0; S57 is "EGF(egfr!1).EGFR(egf!1,egfr,grb2!2,p~P,plcg,shc!3).Grb2(egfr!2,shc!4,sos!5).SOS(grb2!5).Shc(egfr!3,grb2,p~P).Shc(egfr,grb2!4,p~P)";
  species S58 in cell = 0; S58 is "EGF(egfr!1).EGFR(egf!1,egfr,grb2!2,p~P,plcg!3,shc).Grb2(egfr!2,shc!4,sos).PLCg(egfr!3,p~P,p_i~0).Shc(egfr,grb2!4,p~P)";
  species S59 in cell = 0; S59 is "EGF(egfr!1).EGFR(egf!1,egfr,grb2!2,p~P,plcg!3,shc).Grb2(egfr!2,shc!4,sos!5).PLCg(egfr!3,p~P,p_i~0).SOS(grb2!5).Shc(egfr,grb2!4,p~P)";
  species S60 in cell = 0; S60 is "EGF(egfr!1).EGF(egfr!2).EGFR(egf!1,egfr,grb2!3,p~P,plcg,shc).EGFR(egf!2,egfr,grb2,p~P,plcg,shc!4).Grb2(egfr!3,shc!5,sos).Shc(egfr!4,grb2!5,p~0)";
  species S61 in cell = 0; S61 is "EGF(egfr!1).EGF(egfr!2).EGFR(egf!1,egfr,grb2!3,p~P,plcg,shc).EGFR(egf!2,egfr,grb2,p~P,plcg,shc!4).Grb2(egfr!3,shc!5,sos!6).SOS(grb2!6).Shc(egfr!4,grb2!5,p~0)";
  species S62 in cell = 0; S62 is "EGF(egfr!1).EGF(egfr!2).EGFR(egf!1,egfr,grb2!3,p~P,plcg,shc!4).EGFR(egf!2,egfr,grb2,p~P,plcg,shc!5).Grb2(egfr!3,shc!6,sos).Shc(egfr!5,grb2!6,p~P).Shc(egfr!4,grb2,p~P)";
  species S63 in cell = 0; S63 is "EGF(egfr!1).EGF(egfr!2).EGFR(egf!1,egfr,grb2!3,p~P,plcg,shc!4).EGFR(egf!2,egfr,grb2,p~P,plcg,shc!5).Grb2(egfr!3,shc!6,sos!7).SOS(grb2!7).Shc(egfr!5,grb2!6,p~P).Shc(egfr!4,grb2,p~P)";
  species S64 in cell = 0; S64 is "EGF(egfr!1).EGF(egfr!2).EGFR(egf!1,egfr,grb2!3,p~P,plcg!4,shc).EGFR(egf!2,egfr,grb2,p~P,plcg,shc!5).Grb2(egfr!3,shc!6,sos).PLCg(egfr!4,p~P,p_i~0).Shc(egfr!5,grb2!6,p~P)";
  species S65 in cell = 0; S65 is "EGF(egfr!1).EGF(egfr!2).EGFR(egf!1,egfr,grb2!3,p~P,plcg!4,shc).EGFR(egf!2,egfr,grb2,p~P,plcg,shc!5).Grb2(egfr!3,shc!6,sos!7).PLCg(egfr!4,p~P,p_i~0).SOS(grb2!7).Shc(egfr!5,grb2!6,p~P)";
  species S66 in cell = 0; S66 is "EGF(egfr!1).EGF(egfr!2).EGFR(egf!2,egfr,grb2!3,p~P,plcg,shc!4).EGFR(egf!1,egfr,grb2,p~0,plcg,shc!5).Grb2(egfr!3,shc!6,sos).Shc(egfr!5,grb2!6,p~P).Shc(egfr!4,grb2,p~P)";
  species S67 in cell = 0; S67 is "EGF(egfr!1).EGF(egfr!2).EGFR(egf!2,egfr,grb2!3,p~P,plcg,shc!4).EGFR(egf!1,egfr,grb2,p~0,plcg,shc!5).Grb2(egfr!3,shc!6,sos!7).SOS(grb2!7).Shc(egfr!5,grb2!6,p~P).Shc(egfr!4,grb2,p~P)";
  species S68 in cell = 0; S68 is "EGF(egfr!1).EGF(egfr!2).EGFR(egf!2,egfr,grb2!3,p~P,plcg!4,shc).EGFR(egf!1,egfr,grb2,p~0,plcg,shc!5).Grb2(egfr!3,shc!6,sos).PLCg(egfr!4,p~P,p_i~0).Shc(egfr!5,grb2!6,p~P)";
  species S69 in cell = 0; S69 is "EGF(egfr!1).EGF(egfr!2).EGFR(egf!2,egfr,grb2!3,p~P,plcg!4,shc).EGFR(egf!1,egfr,grb2,p~0,plcg,shc!5).Grb2(egfr!3,shc!6,sos!7).PLCg(egfr!4,p~P,p_i~0).SOS(grb2!7).Shc(egfr!5,grb2!6,p~P)";
  species S70 in cell = 0; S70 is "EGF(egfr!1).EGFR(egf!1,egfr,grb2!2,p~P,plcg,shc!3).Grb2(egfr!2,shc!4,sos).Shc(egfr!3,grb2,p~P).Shc(egfr,grb2!4,p~0)";
  species S71 in cell = 0; S71 is "EGF(egfr!1).EGFR(egf!1,egfr,grb2!2,p~P,plcg,shc!3).Grb2(egfr!2,shc!4,sos!5).SOS(grb2!5).Shc(egfr!3,grb2,p~P).Shc(egfr,grb2!4,p~0)";
  species S72 in cell = 0; S72 is "EGF(egfr!1).EGFR(egf!1,egfr,grb2!2,p~P,plcg!3,shc).Grb2(egfr!2,shc!4,sos).PLCg(egfr!3,p~P,p_i~0).Shc(egfr,grb2!4,p~0)";
  species S73 in cell = 0; S73 is "EGF(egfr!1).EGFR(egf!1,egfr,grb2!2,p~P,plcg!3,shc).Grb2(egfr!2,shc!4,sos!5).PLCg(egfr!3,p~P,p_i~0).SOS(grb2!5).Shc(egfr,grb2!4,p~0)";
  species S74 in cell = 0; S74 is "EGF(egfr!1).EGF(egfr!2).EGFR(egf!2,egfr,grb2!3,p~P,plcg,shc).EGFR(egf!1,egfr,grb2,p~P,plcg!4,shc!5).Grb2(egfr!3,shc!6,sos).PLCg(egfr!4,p~P,p_i~0).Shc(egfr!5,grb2!6,p~P)";
  species S75 in cell = 0; S75 is "EGF(egfr!1).EGF(egfr!2).EGFR(egf!2,egfr,grb2!3,p~P,plcg,shc).EGFR(egf!1,egfr,grb2,p~P,plcg!4,shc!5).Grb2(egfr!3,shc!6,sos!7).PLCg(egfr!4,p~P,p_i~0).SOS(grb2!7).Shc(egfr!5,grb2!6,p~P)";
  species S76 in cell = 0; S76 is "EGF(egfr!1).EGF(egfr!2).EGFR(egf!1,egfr,grb2!3,p~P,plcg,shc!4).EGFR(egf!2,egfr,grb2!5,p~P,plcg,shc).Grb2(egfr!5,shc!6,sos).Grb2(egfr!3,shc,sos).Shc(egfr!4,grb2!6,p~P)";
  species S77 in cell = 0; S77 is "EGF(egfr!1).EGF(egfr!2).EGFR(egf!1,egfr,grb2!3,p~P,plcg,shc!4).EGFR(egf!2,egfr,grb2!5,p~P,plcg,shc).Grb2(egfr!5,shc!6,sos).Grb2(egfr!3,shc,sos!7).SOS(grb2!7).Shc(egfr!4,grb2!6,p~P)";
  species S78 in cell = 0; S78 is "EGF(egfr!1).EGF(egfr!2).EGFR(egf!1,egfr,grb2!3,p~P,plcg,shc!4).EGFR(egf!2,egfr,grb2!5,p~P,plcg,shc).Grb2(egfr!5,shc!6,sos!7).Grb2(egfr!3,shc,sos).SOS(grb2!7).Shc(egfr!4,grb2!6,p~P)";
  species S79 in cell = 0; S79 is "EGF(egfr!1).EGF(egfr!2).EGFR(egf!1,egfr,grb2!3,p~P,plcg,shc!4).EGFR(egf!2,egfr,grb2!5,p~P,plcg,shc).Grb2(egfr!5,shc!6,sos!7).Grb2(egfr!3,shc,sos!8).SOS(grb2!7).SOS(grb2!8).Shc(egfr!4,grb2!6,p~P)";
  species S80 in cell = 0; S80 is "EGF(egfr!1).EGFR(egf!1,egfr,grb2,p~P,plcg!2,shc!3).Grb2(egfr,shc!4,sos).PLCg(egfr!2,p~P,p_i~0).Shc(egfr!3,grb2!4,p~0)";
  species S81 in cell = 0; S81 is "EGF(egfr!1).EGFR(egf!1,egfr,grb2,p~P,plcg!2,shc!3).Grb2(egfr,shc!4,sos!5).PLCg(egfr!2,p~P,p_i~0).SOS(grb2!5).Shc(egfr!3,grb2!4,p~0)";
  species S82 in cell = 0; S82 is "EGF(egfr!1).EGFR(egf!1,egfr,grb2!2,p~P,plcg,shc!3).Grb2(egfr!2,shc,sos).Grb2(egfr,shc!4,sos).Shc(egfr!3,grb2!4,p~0)";
  species S83 in cell = 0; S83 is "EGF(egfr!1).EGFR(egf!1,egfr,grb2!2,p~P,plcg,shc!3).Grb2(egfr!2,shc,sos!4).Grb2(egfr,shc!5,sos).SOS(grb2!4).Shc(egfr!3,grb2!5,p~0)";
  species S84 in cell = 0; S84 is "EGF(egfr!1).EGFR(egf!1,egfr,grb2!2,p~P,plcg,shc!3).Grb2(egfr!2,shc,sos).Grb2(egfr,shc!4,sos!5).SOS(grb2!5).Shc(egfr!3,grb2!4,p~0)";
  species S85 in cell = 0; S85 is "EGF(egfr!1).EGFR(egf!1,egfr,grb2!2,p~P,plcg,shc!3).Grb2(egfr!2,shc,sos!4).Grb2(egfr,shc!5,sos!6).SOS(grb2!6).SOS(grb2!4).Shc(egfr!3,grb2!5,p~0)";
  species S86 in cell = 0; S86 is "EGF(egfr!1).EGF(egfr!2).EGFR(egf!1,egfr,grb2!3,p~P,plcg,shc!4).EGFR(egf!2,egfr,grb2,p~P,plcg,shc!5).Grb2(egfr!3,shc!6,sos).Shc(egfr!5,grb2!6,p~0).Shc(egfr!4,grb2,p~P)";
  species S87 in cell = 0; S87 is "EGF(egfr!1).EGF(egfr!2).EGFR(egf!1,egfr,grb2!3,p~P,plcg,shc!4).EGFR(egf!2,egfr,grb2,p~P,plcg,shc!5).Grb2(egfr!3,shc!6,sos!7).SOS(grb2!7).Shc(egfr!5,grb2!6,p~0).Shc(egfr!4,grb2,p~P)";
  species S88 in cell = 0; S88 is "EGF(egfr!1).EGF(egfr!2).EGFR(egf!1,egfr,grb2!3,p~P,plcg!4,shc).EGFR(egf!2,egfr,grb2,p~P,plcg,shc!5).Grb2(egfr!3,shc!6,sos).PLCg(egfr!4,p~P,p_i~0).Shc(egfr!5,grb2!6,p~0)";
  species S89 in cell = 0; S89 is "EGF(egfr!1).EGF(egfr!2).EGFR(egf!1,egfr,grb2!3,p~P,plcg!4,shc).EGFR(egf!2,egfr,grb2,p~P,plcg,shc!5).Grb2(egfr!3,shc!6,sos!7).PLCg(egfr!4,p~P,p_i~0).SOS(grb2!7).Shc(egfr!5,grb2!6,p~0)";
  species S90 in cell = 0; S90 is "EGF(egfr!1).EGF(egfr!2).EGFR(egf!2,egfr,grb2!3,p~P,plcg,shc).EGFR(egf!1,egfr,grb2,p~P,plcg!4,shc!5).Grb2(egfr!3,shc!6,sos).PLCg(egfr!4,p~P,p_i~0).Shc(egfr!5,grb2!6,p~0)";
  species S91 in cell = 0; S91 is "EGF(egfr!1).EGF(egfr!2).EGFR(egf!2,egfr,grb2!3,p~P,plcg,shc).EGFR(egf!1,egfr,grb2,p~P,plcg!4,shc!5).Grb2(egfr!3,shc!6,sos!7).PLCg(egfr!4,p~P,p_i~0).SOS(grb2!7).Shc(egfr!5,grb2!6,p~0)";
  species S92 in cell = 0; S92 is "EGF(egfr!1).EGF(egfr!2).EGFR(egf!1,egfr,grb2!3,p~P,plcg,shc!4).EGFR(egf!2,egfr,grb2!5,p~P,plcg,shc).Grb2(egfr!5,shc!6,sos).Grb2(egfr!3,shc,sos).Shc(egfr!4,grb2!6,p~0)";
  species S93 in cell = 0; S93 is "EGF(egfr!1).EGF(egfr!2).EGFR(egf!1,egfr,grb2!3,p~P,plcg,shc!4).EGFR(egf!2,egfr,grb2!5,p~P,plcg,shc).Grb2(egfr!5,shc!6,sos).Grb2(egfr!3,shc,sos!7).SOS(grb2!7).Shc(egfr!4,grb2!6,p~0)";
  species S94 in cell = 0; S94 is "EGF(egfr!1).EGF(egfr!2).EGFR(egf!1,egfr,grb2!3,p~P,plcg,shc!4).EGFR(egf!2,egfr,grb2!5,p~P,plcg,shc).Grb2(egfr!5,shc!6,sos!7).Grb2(egfr!3,shc,sos).SOS(grb2!7).Shc(egfr!4,grb2!6,p~0)";
  species S95 in cell = 0; S95 is "EGF(egfr!1).EGF(egfr!2).EGFR(egf!1,egfr,grb2!3,p~P,plcg,shc!4).EGFR(egf!2,egfr,grb2!5,p~P,plcg,shc).Grb2(egfr!5,shc!6,sos!7).Grb2(egfr!3,shc,sos!8).SOS(grb2!7).SOS(grb2!8).Shc(egfr!4,grb2!6,p~0)";
  species S96 in cell = 0; S96 is "EGF(egfr!1).EGF(egfr!2).EGFR(egf!1,egfr,grb2!3,p~P,plcg,shc!4).EGFR(egf!2,egfr,grb2,p~P,plcg!5,shc!6).Grb2(egfr!3,shc!7,sos).PLCg(egfr!5,p~P,p_i~0).Shc(egfr!6,grb2!7,p~P).Shc(egfr!4,grb2,p~P)";
  species S97 in cell = 0; S97 is "EGF(egfr!1).EGF(egfr!2).EGFR(egf!1,egfr,grb2!3,p~P,plcg,shc!4).EGFR(egf!2,egfr,grb2,p~P,plcg!5,shc!6).Grb2(egfr!3,shc!7,sos!8).PLCg(egfr!5,p~P,p_i~0).SOS(grb2!8).Shc(egfr!6,grb2!7,p~P).Shc(egfr!4,grb2,p~P)";
  species S98 in cell = 0; S98 is "EGF(egfr!1).EGF(egfr!2).EGFR(egf!1,egfr,grb2!3,p~P,plcg!4,shc).EGFR(egf!2,egfr,grb2,p~P,plcg!5,shc!6).Grb2(egfr!3,shc!7,sos).PLCg(egfr!4,p~P,p_i~0).PLCg(egfr!5,p~P,p_i~0).Shc(egfr!6,grb2!7,p~P)";
  species S99 in cell = 0; S99 is "EGF(egfr!1).EGF(egfr!2).EGFR(egf!1,egfr,grb2!3,p~P,plcg!4,shc).EGFR(egf!2,egfr,grb2,p~P,plcg!5,shc!6).Grb2(egfr!3,shc!7,sos!8).PLCg(egfr!4,p~P,p_i~0).PLCg(egfr!5,p~P,p_i~0).SOS(grb2!8).Shc(egfr!6,grb2!7,p~P)";
  species S100 in cell = 0; S100 is "EGF(egfr!1).EGF(egfr!2).EGFR(egf!1,egfr,grb2!3,p~P,plcg,shc!4).EGFR(egf!2,egfr,grb2!5,p~P,plcg,shc!6).Grb2(egfr!3,shc!7,sos).Grb2(egfr!5,shc,sos).Shc(egfr!6,grb2!7,p~P).Shc(egfr!4,grb2,p~P)";
  species S101 in cell = 0; S101 is "EGF(egfr!1).EGF(egfr!2).EGFR(egf!1,egfr,grb2!3,p~P,plcg,shc!4).EGFR(egf!2,egfr,grb2!5,p~P,plcg,shc!6).Grb2(egfr!3,shc!7,sos).Grb2(egfr!5,shc,sos!8).SOS(grb2!8).Shc(egfr!6,grb2!7,p~P).Shc(egfr!4,grb2,p~P)";
  species S102 in cell = 0; S102 is "EGF(egfr!1).EGF(egfr!2).EGFR(egf!1,egfr,grb2!3,p~P,plcg,shc!4).EGFR(egf!2,egfr,grb2!5,p~P,plcg,shc!6).Grb2(egfr!3,shc!7,sos!8).Grb2(egfr!5,shc,sos).SOS(grb2!8).Shc(egfr!6,grb2!7,p~P).Shc(egfr!4,grb2,p~P)";
  species S103 in cell = 0; S103 is "EGF(egfr!1).EGF(egfr!2).EGFR(egf!1,egfr,grb2!3,p~P,plcg,shc!4).EGFR(egf!2,egfr,grb2!5,p~P,plcg,shc!6).Grb2(egfr!3,shc!7,sos!8).Grb2(egfr!5,shc,sos!9).SOS(grb2!8).SOS(grb2!9).Shc(egfr!6,grb2!7,p~P).Shc(egfr!4,grb2,p~P)";
  species S104 in cell = 0; S104 is "EGF(egfr!1).EGF(egfr!2).EGFR(egf!1,egfr,grb2!3,p~P,plcg!4,shc).EGFR(egf!2,egfr,grb2!5,p~P,plcg,shc!6).Grb2(egfr!3,shc!7,sos).Grb2(egfr!5,shc,sos).PLCg(egfr!4,p~P,p_i~0).Shc(egfr!6,grb2!7,p~P)";
  species S105 in cell = 0; S105 is "EGF(egfr!1).EGF(egfr!2).EGFR(egf!1,egfr,grb2!3,p~P,plcg!4,shc).EGFR(egf!2,egfr,grb2!5,p~P,plcg,shc!6).Grb2(egfr!3,shc!7,sos).Grb2(egfr!5,shc,sos!8).PLCg(egfr!4,p~P,p_i~0).SOS(grb2!8).Shc(egfr!6,grb2!7,p~P)";
  species S106 in cell = 0; S106 is "EGF(egfr!1).EGF(egfr!2).EGFR(egf!1,egfr,grb2!3,p~P,plcg!4,shc).EGFR(egf!2,egfr,grb2!5,p~P,plcg,shc!6).Grb2(egfr!3,shc!7,sos!8).Grb2(egfr!5,shc,sos).PLCg(egfr!4,p~P,p_i~0).SOS(grb2!8).Shc(egfr!6,grb2!7,p~P)";
  species S107 in cell = 0; S107 is "EGF(egfr!1).EGF(egfr!2).EGFR(egf!1,egfr,grb2!3,p~P,plcg!4,shc).EGFR(egf!2,egfr,grb2!5,p~P,plcg,shc!6).Grb2(egfr!3,shc!7,sos!8).Grb2(egfr!5,shc,sos!9).PLCg(egfr!4,p~P,p_i~0).SOS(grb2!8).SOS(grb2!9).Shc(egfr!6,grb2!7,p~P)";
  species S108 in cell = 0; S108 is "EGF(egfr!1).EGF(egfr!2).EGFR(egf!1,egfr,grb2!3,p~P,plcg,shc!4).EGFR(egf!2,egfr,grb2,p~P,plcg!5,shc!6).Grb2(egfr!3,shc!7,sos).PLCg(egfr!5,p~P,p_i~0).Shc(egfr!6,grb2!7,p~0).Shc(egfr!4,grb2,p~P)";
  species S109 in cell = 0; S109 is "EGF(egfr!1).EGF(egfr!2).EGFR(egf!1,egfr,grb2!3,p~P,plcg,shc!4).EGFR(egf!2,egfr,grb2,p~P,plcg!5,shc!6).Grb2(egfr!3,shc!7,sos!8).PLCg(egfr!5,p~P,p_i~0).SOS(grb2!8).Shc(egfr!6,grb2!7,p~0).Shc(egfr!4,grb2,p~P)";
  species S110 in cell = 0; S110 is "EGF(egfr!1).EGF(egfr!2).EGFR(egf!1,egfr,grb2!3,p~P,plcg!4,shc).EGFR(egf!2,egfr,grb2,p~P,plcg!5,shc!6).Grb2(egfr!3,shc!7,sos).PLCg(egfr!4,p~P,p_i~0).PLCg(egfr!5,p~P,p_i~0).Shc(egfr!6,grb2!7,p~0)";
  species S111 in cell = 0; S111 is "EGF(egfr!1).EGF(egfr!2).EGFR(egf!1,egfr,grb2!3,p~P,plcg!4,shc).EGFR(egf!2,egfr,grb2,p~P,plcg!5,shc!6).Grb2(egfr!3,shc!7,sos!8).PLCg(egfr!4,p~P,p_i~0).PLCg(egfr!5,p~P,p_i~0).SOS(grb2!8).Shc(egfr!6,grb2!7,p~0)";
  species S112 in cell = 0; S112 is "EGF(egfr!1).EGF(egfr!2).EGFR(egf!1,egfr,grb2!3,p~P,plcg,shc!4).EGFR(egf!2,egfr,grb2!5,p~P,plcg,shc!6).Grb2(egfr!3,shc!7,sos).Grb2(egfr!5,shc,sos).Shc(egfr!6,grb2!7,p~0).Shc(egfr!4,grb2,p~P)";
  species S113 in cell = 0; S113 is "EGF(egfr!1).EGF(egfr!2).EGFR(egf!1,egfr,grb2!3,p~P,plcg,shc!4).EGFR(egf!2,egfr,grb2!5,p~P,plcg,shc!6).Grb2(egfr!3,shc!7,sos).Grb2(egfr!5,shc,sos!8).SOS(grb2!8).Shc(egfr!6,grb2!7,p~0).Shc(egfr!4,grb2,p~P)";
  species S114 in cell = 0; S114 is "EGF(egfr!1).EGF(egfr!2).EGFR(egf!1,egfr,grb2!3,p~P,plcg,shc!4).EGFR(egf!2,egfr,grb2!5,p~P,plcg,shc!6).Grb2(egfr!3,shc!7,sos!8).Grb2(egfr!5,shc,sos).SOS(grb2!8).Shc(egfr!6,grb2!7,p~0).Shc(egfr!4,grb2,p~P)";
  species S115 in cell = 0; S115 is "EGF(egfr!1).EGF(egfr!2).EGFR(egf!1,egfr,grb2!3,p~P,plcg,shc!4).EGFR(egf!2,egfr,grb2!5,p~P,plcg,shc!6).Grb2(egfr!3,shc!7,sos!8).Grb2(egfr!5,shc,sos!9).SOS(grb2!8).SOS(grb2!9).Shc(egfr!6,grb2!7,p~0).Shc(egfr!4,grb2,p~P)";
  species S116 in cell = 0; S116 is "EGF(egfr!1).EGF(egfr!2).EGFR(egf!1,egfr,grb2!3,p~P,plcg!4,shc).EGFR(egf!2,egfr,grb2!5,p~P,plcg,shc!6).Grb2(egfr!3,shc!7,sos).Grb2(egfr!5,shc,sos).PLCg(egfr!4,p~P,p_i~0).Shc(egfr!6,grb2!7,p~0)";
  species S117 in cell = 0; S117 is "EGF(egfr!1).EGF(egfr!2).EGFR(egf!1,egfr,grb2!3,p~P,plcg!4,shc).EGFR(egf!2,egfr,grb2!5,p~P,plcg,shc!6).Grb2(egfr!3,shc!7,sos).Grb2(egfr!5,shc,sos!8).PLCg(egfr!4,p~P,p_i~0).SOS(grb2!8).Shc(egfr!6,grb2!7,p~0)";
  species S118 in cell = 0; S118 is "EGF(egfr!1).EGF(egfr!2).EGFR(egf!1,egfr,grb2!3,p~P,plcg!4,shc).EGFR(egf!2,egfr,grb2!5,p~P,plcg,shc!6).Grb2(egfr!3,shc!7,sos!8).Grb2(egfr!5,shc,sos).PLCg(egfr!4,p~P,p_i~0).SOS(grb2!8).Shc(egfr!6,grb2!7,p~0)";
  species S119 in cell = 0; S119 is "EGF(egfr!1).EGF(egfr!2).EGFR(egf!1,egfr,grb2!3,p~P,plcg!4,shc).EGFR(egf!2,egfr,grb2!5,p~P,plcg,shc!6).Grb2(egfr!3,shc!7,sos!8).Grb2(egfr!5,shc,sos!9).PLCg(egfr!4,p~P,p_i~0).SOS(grb2!8).SOS(grb2!9).Shc(egfr!6,grb2!7,p~0)";

  // Parameters:
  r3_k3f = 0.59604879;
  r3_k3b = 1e-5;
  r4_V4 = 1e-5;
  r4_K4 = 90.807303;
  r6_k6f = 10;
  r6_k6b = 1.0645274;
  r7_k7f = 0.22787467;
  r7_k7b = 1;
  r8_V8 = 0.15462037;
  r8_K8 = 0.022304438;
  r14_k14f = 10;
  r14_k14b = 1e-5;
  r15_k15f = 5;
  r15_k15b = 0.39805841;
  r16_V16 = 4.649277;
  r16_K16 = 100;
  r25_k25f = 1e-5;
  r25_k25b = 3.0355213;
  Gf_LR = 10;
  Gf_RR = 0.47621436;
  Gf_RSh = 0.75631995;
  Gf_LRR = -2.1118317;
  Gf_LRRL = 0.25479524;
  Gf_RShP = 5.9619616;
  Gf_RG = 4.507479;
  Gf_GS = -10;
  Gf_RGS = -2.2185787;
  Gf_ShG = 2.4359591;
  Gf_RShG = -8.2252783;
  Gf_ShGS = -10;
  Gf_RPL = 3.5299589;
  Gf_RPLP = 10;
  Gf_Rmulti1 = -7.3648913;
  Gf_Rmulti2 = 3.5392832;
  Gf_Rmulti3 = 7.2888009;
  phi = 0.44092825;
  Ea_RR = 2.1674612;
  Ea_LR = -10;
  Ea_RSh = 5.1315227;
  Ea_RG = 3.7727168;
  Ea_GS = -1.6461566;
  Ea_ShG = 3.7293551;
  Ea_RPL = 4.4904825;
  _v1_local1 = exp(-(Ea_LR + phi*Gf_LR));
  __reverse_v1_local1 = exp(-(Ea_LR + (1 - phi)*(-Gf_LR)));
  _v2_local1 = exp(-(Ea_RR + phi*(-2*Gf_LR + Gf_RR + 2*Gf_LRR + Gf_LRRL)));
  __reverse_v2_local1 = exp(-(Ea_RR + (1 - phi)*(2*Gf_LR + (-(Gf_RR + 2*Gf_LRR + Gf_LRRL)))));
  _v13_local1 = exp(-(Ea_RSh + phi*Gf_RSh));
  _v9_local1 = exp(-(Ea_RG + phi*Gf_RG));
  _v5_local1 = exp(-(Ea_RPL + phi*Gf_RPL));
  __reverse_v13_local1 = exp(-(Ea_RSh + (1 - phi)*(-Gf_RSh)));
  __reverse_v9_local1 = exp(-(Ea_RG + (1 - phi)*(-Gf_RG)));
  __reverse_v12_local1 = exp(-(Ea_GS + (1 - phi)*(Gf_GS + Gf_RGS)));
  __reverse_v5_local1 = exp(-(Ea_RPL + (1 - phi)*(-Gf_RPL)));
  __R1_local1 = exp(-(Ea_RSh + phi*(Gf_RSh + Gf_RShP + Gf_Rmulti1)));
  __R2_local1 = exp(-(Ea_RPL + phi*(Gf_RPL + Gf_RPLP + Gf_Rmulti1)));
  __R3_local1 = exp(-(Ea_RG + phi*(Gf_RG + Gf_Rmulti2)));
  __R4_local1 = exp(-(Ea_RSh + phi*(Gf_RSh + Gf_RShP + Gf_Rmulti2)));
  __R5_local1 = exp(-(Ea_RG + phi*(Gf_RG + Gf_Rmulti3)));
  __R6_local1 = exp(-(Ea_RPL + phi*(Gf_RPL + Gf_RPLP + Gf_Rmulti3)));
  __reverse_v9_local2 = exp(-(Ea_RG + (1 - phi)*(-Gf_RG + (-Gf_RGS))));
  _v12_local1 = exp(-(Ea_GS + phi*(-Gf_GS + (-Gf_RGS))));
  __reverse__R1_local1 = exp(-(Ea_RSh + (1 - phi)*(-Gf_RSh + (-Gf_RShP) + (-Gf_Rmulti1))));
  __reverse__R2_local1 = exp(-(Ea_RPL + (1 - phi)*(-Gf_RPL + (-Gf_RPLP) + (-Gf_Rmulti1))));
  __reverse__R3_local1 = exp(-(Ea_RG + (1 - phi)*(-Gf_RG + (-Gf_Rmulti2))));
  __reverse__R4_local1 = exp(-(Ea_RSh + (1 - phi)*(-Gf_RSh + (-Gf_RShP) + (-Gf_Rmulti2))));
  __reverse__R5_local1 = exp(-(Ea_RG + (1 - phi)*(-Gf_RG + (-Gf_Rmulti3))));
  __reverse__R6_local1 = exp(-(Ea_RPL + (1 - phi)*(-Gf_RPL + (-Gf_RPLP) + (-Gf_Rmulti3))));
  _v13_local2 = exp(-(Ea_RSh + phi*(Gf_RSh + Gf_RShP)));
  __reverse_v13_local2 = exp(-(Ea_RSh + (1 - phi)*(-Gf_RSh + (-Gf_RShP))));
  _v9_local2 = exp(-(Ea_RG + phi*(Gf_RG + Gf_RGS)));
  _v21_local1 = exp(-(Ea_ShG + phi*Gf_ShG));
  _v21_local2 = exp(-(Ea_ShG + phi*(Gf_ShG + Gf_ShGS)));
  __R3_local2 = exp(-(Ea_RG + phi*(Gf_RG + Gf_RGS + Gf_Rmulti2)));
  __reverse__R3_local2 = exp(-(Ea_RG + (1 - phi)*(-Gf_RG + (-Gf_RGS) + (-Gf_Rmulti2))));
  __R5_local2 = exp(-(Ea_RG + phi*(Gf_RG + Gf_RGS + Gf_Rmulti3)));
  __reverse__R5_local2 = exp(-(Ea_RG + (1 - phi)*(-Gf_RG + (-Gf_RGS) + (-Gf_Rmulti3))));
  _v13_local3 = exp(-(Ea_RSh + phi*(Gf_RSh + Gf_RShP + Gf_RShG)));
  __reverse_v21_local1 = exp(-(Ea_ShG + (1 - phi)*(-Gf_ShG)));
  __reverse_v21_local2 = exp(-(Ea_ShG + (1 - phi)*(-Gf_ShG + (-Gf_ShGS))));
  __reverse_v13_local3 = exp(-(Ea_RSh + (1 - phi)*(-Gf_RSh + (-Gf_RShP) + (-Gf_RShG))));
  _v12_local2 = exp(-(Ea_GS + phi*(-Gf_GS + (-Gf_RGS) + (-Gf_ShGS))));
  __reverse_v12_local2 = exp(-(Ea_GS + (1 - phi)*(Gf_GS + Gf_RGS + Gf_ShGS)));

  // Assignment rules:
  EGF_EGFR2_P := S9 + S10 + S11 + S12 + S14 + S15 + S16 + S17 + S18 + S19 + S20 + S21 + S24 + S25 + S26 + S27 + S29 + S33 + S34 + S35 + S40 + S41 + S42 + S43 + S44 + S45 + S46 + S47 + S48 + S49 + S50 + S51 + S52 + S53 + S54 + S55 + S56 + S57 + S58 + S59 + S60 + S61 + S62 + S63 + S64 + S65 + S66 + S67 + S68 + S69 + S70 + S71 + S72 + S73 + S74 + S75 + S76 + S77 + S78 + S79 + S80 + S81 + S82 + S83 + S84 + S85 + S86 + S87 + S88 + S89 + S90 + S91 + S92 + S93 + S94 + S95 + S96 + S97 + S98 + S99 + S100 + S101 + S102 + S103 + S104 + S105 + S106 + S107 + S108 + S109 + S110 + S111 + S112 + S113 + S114 + S115 + S116 + S117 + S118 + S119;
  Shc_P := 0 + Shc_egfr_grb2_p_P;
  EGFRPtotal := 2*S9 + 2*S10 + 2*S11 + 2*S12 + 2*S13 + 2*S14 + 2*S15 + 2*S40 + 4*S41 + 2*S45 + 2*S47 + 2*S49 + 2*S61 + 2*S75 + 2*S78 + 2*S79 + 2*S91 + 2*S94 + 2*S95;
  ShPtotal := S16 + Shc_egfr_grb2_p_P + S29 + S30 + S33;
  Grb2EGFRtotal := S11 + S14 + S40 + 2*S41 + S45 + S47 + S49 + S61 + S75 + S78 + S79 + S91 + S94 + S95;
  Grb2Shctotal := S30 + S31 + S34 + S35 + S36 + S37 + S40 + S41 + S44 + S45 + S46 + S47 + S50 + S51 + S52 + S53 + S54 + S55 + S56 + S57 + S58 + S59 + S62 + S63 + S64 + S65 + S66 + S67 + S68 + S69 + S74 + S75 + S76 + S77 + S78 + S79 + S96 + S97 + S98 + S99 + S100 + S101 + S102 + S103 + S104 + S105 + S106 + S107;
  PLCg_P := 0 + PLCg_egfr_p_P_p_i_0;
  PLCgPtotal := S15 + PLCg_egfr_p_P_p_i_0;
  fRate3 := r4_V4/(EGF_EGFR2_P + r4_K4);
  fRate15 := r16_V16/(Shc_P + r16_K16);
  fRate7 := r8_V8/(PLCg_P + r8_K8);

  // Reactions:
  R1: EGF_egfr + EGFR_egf_egfr_grb2_p_0_plcg_shc => S7; _v1_local1*EGF_egfr*EGFR_egf_egfr_grb2_p_0_plcg_shc;
  R2: S7 => EGF_egfr + EGFR_egf_egfr_grb2_p_0_plcg_shc; __reverse_v1_local1*S7;
  R3: S7 + S7 => S8; 0.5*_v2_local1*S7*S7;
  R4: S8 => S7 + S7; 2*__reverse_v2_local1*S8;
  R5: S8 => S9; 2*r3_k3f*S8;
  R6: S9 => S8; r3_k3b*S9;
  R7: S9 => S8; fRate3*S9;
  R8: Shc_egfr_grb2_p_0 + S9 => S10; _v13_local1*Shc_egfr_grb2_p_0*S9;
  R9: Grb2_egfr_shc_sos + S9 => S11; _v9_local1*Grb2_egfr_shc_sos*S9;
  R10: PLCg_egfr_p_0_p_i_0 + S9 => S12; _v5_local1*PLCg_egfr_p_0_p_i_0*S9;
  R11: S10 => Shc_egfr_grb2_p_0 + S9; __reverse_v13_local1*S10;
  R12: S10 => S13; r14_k14f*S10;
  R13: S11 => Grb2_egfr_shc_sos + S9; __reverse_v9_local1*S11;
  R14: SOS_grb2 + S11 => S14; __reverse_v12_local1*SOS_grb2*S11;
  R15: S12 => PLCg_egfr_p_0_p_i_0 + S9; __reverse_v5_local1*S12;
  R16: S12 => S15; r6_k6f*S12;
  R17: Shc_egfr_grb2_p_0 + S12 => S16; __R1_local1*Shc_egfr_grb2_p_0*S12;
  R18: PLCg_egfr_p_0_p_i_0 + S10 => S17; __R2_local1*PLCg_egfr_p_0_p_i_0*S10;
  R19: Grb2_egfr_shc_sos + S10 => S18; __R3_local1*Grb2_egfr_shc_sos*S10;
  R20: Shc_egfr_grb2_p_0 + S11 => S19; __R4_local1*Shc_egfr_grb2_p_0*S11;
  R21: Grb2_egfr_shc_sos + S12 => S20; __R5_local1*Grb2_egfr_shc_sos*S12;
  R22: PLCg_egfr_p_0_p_i_0 + S11 => S21; __R6_local1*PLCg_egfr_p_0_p_i_0*S11;
  R23: S13 => S10; r14_k14b*S13;
  R24: S13 => S9 + Shc_egfr_grb2_p_P; r15_k15f*S13;
  R25: S14 => S9 + Grb2_egfr_shc_sos_1_SOS_grb2_1; __reverse_v9_local2*S14;
  R26: S14 => SOS_grb2 + S11; _v12_local1*S14;
  R27: SOS_grb2 + S18 => S24; __reverse_v12_local1*SOS_grb2*S18;
  R28: SOS_grb2 + S19 => S25; __reverse_v12_local1*SOS_grb2*S19;
  R29: SOS_grb2 + S20 => S26; __reverse_v12_local1*SOS_grb2*S20;
  R30: SOS_grb2 + S21 => S27; __reverse_v12_local1*SOS_grb2*S21;
  R31: S15 => S12; r6_k6b*S15;
  R32: S15 => S9 + PLCg_egfr_p_P_p_i_0; r7_k7f*S15;
  R33: S16 => Shc_egfr_grb2_p_0 + S12; __reverse__R1_local1*S16;
  R34: S17 => PLCg_egfr_p_0_p_i_0 + S10; __reverse__R2_local1*S17;
  R35: S18 => Grb2_egfr_shc_sos + S10; __reverse__R3_local1*S18;
  R36: S19 => Grb2_egfr_shc_sos + S29; __reverse__R3_local1*S19;
  R37: Shc_egfr_grb2_p_0 + S14 => S25; __R4_local1*Shc_egfr_grb2_p_0*S14;
  R38: S19 => Shc_egfr_grb2_p_0 + S11; __reverse__R4_local1*S19;
  R39: S20 => Grb2_egfr_shc_sos + S12; __reverse__R5_local1*S20;
  R40: PLCg_egfr_p_0_p_i_0 + S14 => S27; __R6_local1*PLCg_egfr_p_0_p_i_0*S14;
  R41: S21 => PLCg_egfr_p_0_p_i_0 + S11; __reverse__R6_local1*S21;
  R42: S9 + Shc_egfr_grb2_p_P => S29; _v13_local2*S9*Shc_egfr_grb2_p_P;
  R43: S29 => S9 + Shc_egfr_grb2_p_P; __reverse_v13_local2*S29;
  R44: S9 + Shc_egfr_grb2_p_P => S13; r15_k15b*S9*Shc_egfr_grb2_p_P;
  R45: Shc_egfr_grb2_p_P => Shc_egfr_grb2_p_0; fRate15*Shc_egfr_grb2_p_P;
  R46: S9 + Grb2_egfr_shc_sos_1_SOS_grb2_1 => S14; _v9_local2*S9*Grb2_egfr_shc_sos_1_SOS_grb2_1;
  R47: S24 => SOS_grb2 + S18; _v12_local1*S24;
  R48: S25 => SOS_grb2 + S19; _v12_local1*S25;
  R49: S26 => SOS_grb2 + S20; _v12_local1*S26;
  R50: S27 => SOS_grb2 + S21; _v12_local1*S27;
  R51: Grb2_egfr_shc_sos + Shc_egfr_grb2_p_P => S30; _v21_local1*Grb2_egfr_shc_sos*Shc_egfr_grb2_p_P;
  R52: Shc_egfr_grb2_p_P + Grb2_egfr_shc_sos_1_SOS_grb2_1 => S31; _v21_local2*Shc_egfr_grb2_p_P*Grb2_egfr_shc_sos_1_SOS_grb2_1;
  R53: S9 + PLCg_egfr_p_P_p_i_0 => S15; r7_k7b*S9*PLCg_egfr_p_P_p_i_0;
  R54: PLCg_egfr_p_P_p_i_0 => PLCg_egfr_p_0_p_i_0; fRate7*PLCg_egfr_p_P_p_i_0;
  R55: PLCg_egfr_p_P_p_i_0 => PLCg_egfr_p_0_p_i_I; r25_k25f*PLCg_egfr_p_P_p_i_0;
  R56: PLCg_egfr_p_0_p_i_0 + S29 => S33; __R2_local1*PLCg_egfr_p_0_p_i_0*S29;
  R57: S10 + Grb2_egfr_shc_sos_1_SOS_grb2_1 => S24; __R3_local2*S10*Grb2_egfr_shc_sos_1_SOS_grb2_1;
  R58: Grb2_egfr_shc_sos + S29 => S19; __R3_local1*Grb2_egfr_shc_sos*S29;
  R59: Grb2_egfr_shc_sos_1_SOS_grb2_1 + S29 => S25; __R3_local2*Grb2_egfr_shc_sos_1_SOS_grb2_1*S29;
  R60: S24 => S10 + Grb2_egfr_shc_sos_1_SOS_grb2_1; __reverse__R3_local2*S24;
  R61: S25 => Grb2_egfr_shc_sos_1_SOS_grb2_1 + S29; __reverse__R3_local2*S25;
  R62: S25 => Shc_egfr_grb2_p_0 + S14; __reverse__R4_local1*S25;
  R63: S12 + Grb2_egfr_shc_sos_1_SOS_grb2_1 => S26; __R5_local2*S12*Grb2_egfr_shc_sos_1_SOS_grb2_1;
  R64: S26 => S12 + Grb2_egfr_shc_sos_1_SOS_grb2_1; __reverse__R5_local2*S26;
  R65: S27 => PLCg_egfr_p_0_p_i_0 + S14; __reverse__R6_local1*S27;
  R66: S9 + S30 => S34; _v13_local3*S9*S30;
  R67: S9 + S31 => S35; _v13_local3*S9*S31;
  R68: S9 + S30 => S36; r15_k15b*S9*S30;
  R69: S9 + S31 => S37; r15_k15b*S9*S31;
  R70: S30 => S38; fRate15*S30;
  R71: S31 => S39; fRate15*S31;
  R72: S9 + S30 => S40; _v9_local1*S9*S30;
  R73: S9 + S31 => S41; _v9_local2*S9*S31;
  R74: S30 => Grb2_egfr_shc_sos + Shc_egfr_grb2_p_P; __reverse_v21_local1*S30;
  R75: S31 => Shc_egfr_grb2_p_P + Grb2_egfr_shc_sos_1_SOS_grb2_1; __reverse_v21_local2*S31;
  R76: PLCg_egfr_p_0_p_i_I => PLCg_egfr_p_P_p_i_0; r25_k25b*PLCg_egfr_p_0_p_i_I;
  R77: S33 => PLCg_egfr_p_0_p_i_0 + S29; __reverse__R2_local1*S33;
  R78: S9 + S38 => S42; _v13_local1*S9*S38;
  R79: S9 + S39 => S43; _v13_local1*S9*S39;
  R80: S9 + S40 => S44; _v13_local3*S9*S40;
  R81: S9 + S41 => S45; _v13_local3*S9*S41;
  R82: S34 => S9 + S30; __reverse_v13_local3*S34;
  R83: S35 => S9 + S31; __reverse_v13_local3*S35;
  R84: S36 => S42; r14_k14b*S36;
  R85: S37 => S43; r14_k14b*S37;
  R86: S36 => S9 + S30; r15_k15f*S36;
  R87: S37 => S9 + S31; r15_k15f*S37;
  R88: S9 + S40 => S46; r15_k15b*S9*S40;
  R89: S9 + S41 => S47; r15_k15b*S9*S41;
  R90: S40 => S48; fRate15*S40;
  R91: S41 => S49; fRate15*S41;
  R92: S9 + S34 => S44; _v9_local1*S9*S34;
  R93: S9 + S35 => S45; _v9_local2*S9*S35;
  R94: S9 + S36 => S46; _v9_local1*S9*S36;
  R95: S9 + S37 => S47; _v9_local2*S9*S37;
  R96: S9 + S38 => S48; _v9_local1*S9*S38;
  R97: S9 + S39 => S49; _v9_local2*S9*S39;
  R98: S40 => S9 + S30; __reverse_v9_local1*S40;
  R99: S41 => S9 + S31; __reverse_v9_local2*S41;
  R100: S41 => SOS_grb2 + S40; _v12_local2*S41;
  R101: SOS_grb2 + S40 => S41; __reverse_v12_local2*SOS_grb2*S40;
  R102: PLCg_egfr_p_0_p_i_0 + S34 => S50; __R2_local1*PLCg_egfr_p_0_p_i_0*S34;
  R103: PLCg_egfr_p_0_p_i_0 + S35 => S51; __R2_local1*PLCg_egfr_p_0_p_i_0*S35;
  R104: Grb2_egfr_shc_sos + S34 => S52; __R3_local1*Grb2_egfr_shc_sos*S34;
  R105: Grb2_egfr_shc_sos_1_SOS_grb2_1 + S34 => S53; __R3_local2*Grb2_egfr_shc_sos_1_SOS_grb2_1*S34;
  R106: Grb2_egfr_shc_sos + S35 => S54; __R3_local1*Grb2_egfr_shc_sos*S35;
  R107: Grb2_egfr_shc_sos_1_SOS_grb2_1 + S35 => S55; __R3_local2*Grb2_egfr_shc_sos_1_SOS_grb2_1*S35;
  R108: Shc_egfr_grb2_p_0 + S40 => S56; __R4_local1*Shc_egfr_grb2_p_0*S40;
  R109: Shc_egfr_grb2_p_0 + S41 => S57; __R4_local1*Shc_egfr_grb2_p_0*S41;
  R110: PLCg_egfr_p_0_p_i_0 + S40 => S58; __R6_local1*PLCg_egfr_p_0_p_i_0*S40;
  R111: PLCg_egfr_p_0_p_i_0 + S41 => S59; __R6_local1*PLCg_egfr_p_0_p_i_0*S41;
  R112: S9 + S48 => S60; _v13_local1*S9*S48;
  R113: S9 + S49 => S61; _v13_local1*S9*S49;
  R114: S9 + S56 => S62; _v13_local3*S9*S56;
  R115: S9 + S57 => S63; _v13_local3*S9*S57;
  R116: S9 + S58 => S64; _v13_local3*S9*S58;
  R117: S9 + S59 => S65; _v13_local3*S9*S59;
  R118: S42 => S9 + S38; __reverse_v13_local1*S42;
  R119: S43 => S9 + S39; __reverse_v13_local1*S43;
  R120: S44 => S9 + S40; __reverse_v13_local3*S44;
  R121: S45 => S9 + S41; __reverse_v13_local3*S45;
  R122: S42 => S36; r14_k14f*S42;
  R123: S43 => S37; r14_k14f*S43;
  R124: S46 => S60; r14_k14b*S46;
  R125: S47 => S61; r14_k14b*S47;
  R126: S46 => S9 + S40; r15_k15f*S46;
  R127: S47 => S9 + S41; r15_k15f*S47;
  R128: S9 + S56 => S66; r15_k15b*S9*S56;
  R129: S9 + S57 => S67; r15_k15b*S9*S57;
  R130: S9 + S58 => S68; r15_k15b*S9*S58;
  R131: S9 + S59 => S69; r15_k15b*S9*S59;
  R132: S56 => S70; fRate15*S56;
  R133: S57 => S71; fRate15*S57;
  R134: S58 => S72; fRate15*S58;
  R135: S59 => S73; fRate15*S59;
  R136: S9 + S42 => S60; _v9_local1*S9*S42;
  R137: S9 + S43 => S61; _v9_local2*S9*S43;
  R138: S9 + S50 => S74; _v9_local1*S9*S50;
  R139: S9 + S51 => S75; _v9_local2*S9*S51;
  R140: S9 + S52 => S76; _v9_local1*S9*S52;
  R141: S9 + S53 => S77; _v9_local1*S9*S53;
  R142: S9 + S54 => S78; _v9_local2*S9*S54;
  R143: S9 + S55 => S79; _v9_local2*S9*S55;
  R144: S44 => S9 + S34; __reverse_v9_local1*S44;
  R145: S45 => S9 + S35; __reverse_v9_local2*S45;
  R146: S46 => S9 + S36; __reverse_v9_local1*S46;
  R147: S47 => S9 + S37; __reverse_v9_local2*S47;
  R148: S48 => S9 + S38; __reverse_v9_local1*S48;
  R149: S49 => S9 + S39; __reverse_v9_local2*S49;
  R150: S45 => SOS_grb2 + S44; _v12_local2*S45;
  R151: S47 => SOS_grb2 + S46; _v12_local2*S47;
  R152: S49 => SOS_grb2 + S48; _v12_local1*S49;
  R153: S53 => SOS_grb2 + S52; _v12_local1*S53;
  R154: S55 => SOS_grb2 + S54; _v12_local1*S55;
  R155: S57 => SOS_grb2 + S56; _v12_local2*S57;
  R156: S59 => SOS_grb2 + S58; _v12_local2*S59;
  R157: SOS_grb2 + S44 => S45; __reverse_v12_local2*SOS_grb2*S44;
  R158: SOS_grb2 + S46 => S47; __reverse_v12_local2*SOS_grb2*S46;
  R159: SOS_grb2 + S48 => S49; __reverse_v12_local1*SOS_grb2*S48;
  R160: SOS_grb2 + S52 => S53; __reverse_v12_local1*SOS_grb2*S52;
  R161: SOS_grb2 + S54 => S55; __reverse_v12_local1*SOS_grb2*S54;
  R162: SOS_grb2 + S56 => S57; __reverse_v12_local2*SOS_grb2*S56;
  R163: SOS_grb2 + S58 => S59; __reverse_v12_local2*SOS_grb2*S58;
  R164: PLCg_egfr_p_0_p_i_0 + S42 => S80; __R2_local1*PLCg_egfr_p_0_p_i_0*S42;
  R165: PLCg_egfr_p_0_p_i_0 + S43 => S81; __R2_local1*PLCg_egfr_p_0_p_i_0*S43;
  R166: PLCg_egfr_p_0_p_i_0 + S44 => S74; __R2_local1*PLCg_egfr_p_0_p_i_0*S44;
  R167: PLCg_egfr_p_0_p_i_0 + S45 => S75; __R2_local1*PLCg_egfr_p_0_p_i_0*S45;
  R168: S50 => PLCg_egfr_p_0_p_i_0 + S34; __reverse__R2_local1*S50;
  R169: S51 => PLCg_egfr_p_0_p_i_0 + S35; __reverse__R2_local1*S51;
  R170: Grb2_egfr_shc_sos + S42 => S82; __R3_local1*Grb2_egfr_shc_sos*S42;
  R171: Grb2_egfr_shc_sos_1_SOS_grb2_1 + S42 => S83; __R3_local2*Grb2_egfr_shc_sos_1_SOS_grb2_1*S42;
  R172: Grb2_egfr_shc_sos + S43 => S84; __R3_local1*Grb2_egfr_shc_sos*S43;
  R173: Grb2_egfr_shc_sos_1_SOS_grb2_1 + S43 => S85; __R3_local2*Grb2_egfr_shc_sos_1_SOS_grb2_1*S43;
  R174: Grb2_egfr_shc_sos + S44 => S76; __R3_local1*Grb2_egfr_shc_sos*S44;
  R175: Grb2_egfr_shc_sos_1_SOS_grb2_1 + S44 => S77; __R3_local2*Grb2_egfr_shc_sos_1_SOS_grb2_1*S44;
  R176: Grb2_egfr_shc_sos + S45 => S78; __R3_local1*Grb2_egfr_shc_sos*S45;
  R177: Grb2_egfr_shc_sos_1_SOS_grb2_1 + S45 => S79; __R3_local2*Grb2_egfr_shc_sos_1_SOS_grb2_1*S45;
  R178: S52 => Grb2_egfr_shc_sos + S34; __reverse__R3_local1*S52;
  R179: S53 => Grb2_egfr_shc_sos_1_SOS_grb2_1 + S34; __reverse__R3_local2*S53;
  R180: S54 => Grb2_egfr_shc_sos + S35; __reverse__R3_local1*S54;
  R181: S55 => Grb2_egfr_shc_sos_1_SOS_grb2_1 + S35; __reverse__R3_local2*S55;
  R182: Shc_egfr_grb2_p_0 + S44 => S62; __R4_local1*Shc_egfr_grb2_p_0*S44;
  R183: Shc_egfr_grb2_p_0 + S45 => S63; __R4_local1*Shc_egfr_grb2_p_0*S45;
  R184: Shc_egfr_grb2_p_0 + S46 => S66; __R4_local1*Shc_egfr_grb2_p_0*S46;
  R185: Shc_egfr_grb2_p_0 + S47 => S67; __R4_local1*Shc_egfr_grb2_p_0*S47;
  R186: Shc_egfr_grb2_p_0 + S48 => S70; __R4_local1*Shc_egfr_grb2_p_0*S48;
  R187: Shc_egfr_grb2_p_0 + S49 => S71; __R4_local1*Shc_egfr_grb2_p_0*S49;
  R188: S56 => Shc_egfr_grb2_p_0 + S40; __reverse__R4_local1*S56;
  R189: S57 => Shc_egfr_grb2_p_0 + S41; __reverse__R4_local1*S57;
  R190: PLCg_egfr_p_0_p_i_0 + S44 => S64; __R6_local1*PLCg_egfr_p_0_p_i_0*S44;
  R191: PLCg_egfr_p_0_p_i_0 + S45 => S65; __R6_local1*PLCg_egfr_p_0_p_i_0*S45;
  R192: PLCg_egfr_p_0_p_i_0 + S46 => S68; __R6_local1*PLCg_egfr_p_0_p_i_0*S46;
  R193: PLCg_egfr_p_0_p_i_0 + S47 => S69; __R6_local1*PLCg_egfr_p_0_p_i_0*S47;
  R194: PLCg_egfr_p_0_p_i_0 + S48 => S72; __R6_local1*PLCg_egfr_p_0_p_i_0*S48;
  R195: PLCg_egfr_p_0_p_i_0 + S49 => S73; __R6_local1*PLCg_egfr_p_0_p_i_0*S49;
  R196: S58 => PLCg_egfr_p_0_p_i_0 + S40; __reverse__R6_local1*S58;
  R197: S59 => PLCg_egfr_p_0_p_i_0 + S41; __reverse__R6_local1*S59;
  R198: S9 + S70 => S86; _v13_local1*S9*S70;
  R199: S9 + S71 => S87; _v13_local1*S9*S71;
  R200: S9 + S72 => S88; _v13_local1*S9*S72;
  R201: S9 + S73 => S89; _v13_local1*S9*S73;
  R202: S60 => S9 + S48; __reverse_v13_local1*S60;
  R203: S61 => S9 + S49; __reverse_v13_local1*S61;
  R204: S62 => S9 + S56; __reverse_v13_local3*S62;
  R205: S63 => S9 + S57; __reverse_v13_local3*S63;
  R206: S64 => S9 + S58; __reverse_v13_local3*S64;
  R207: S65 => S9 + S59; __reverse_v13_local3*S65;
  R208: S60 => S46; r14_k14f*S60;
  R209: S61 => S47; r14_k14f*S61;
  R210: S66 => S86; r14_k14b*S66;
  R211: S67 => S87; r14_k14b*S67;
  R212: S68 => S88; r14_k14b*S68;
  R213: S69 => S89; r14_k14b*S69;
  R214: S66 => S9 + S56; r15_k15f*S66;
  R215: S67 => S9 + S57; r15_k15f*S67;
  R216: S68 => S9 + S58; r15_k15f*S68;
  R217: S69 => S9 + S59; r15_k15f*S69;
  R218: S9 + S80 => S90; _v9_local1*S9*S80;
  R219: S9 + S81 => S91; _v9_local2*S9*S81;
  R220: S9 + S82 => S92; _v9_local1*S9*S82;
  R221: S9 + S83 => S93; _v9_local1*S9*S83;
  R222: S9 + S84 => S94; _v9_local2*S9*S84;
  R223: S9 + S85 => S95; _v9_local2*S9*S85;
  R224: S60 => S9 + S42; __reverse_v9_local1*S60;
  R225: S61 => S9 + S43; __reverse_v9_local2*S61;
  R226: S74 => S9 + S50; __reverse_v9_local1*S74;
  R227: S75 => S9 + S51; __reverse_v9_local2*S75;
  R228: S76 => S9 + S52; __reverse_v9_local1*S76;
  R229: S77 => S9 + S53; __reverse_v9_local1*S77;
  R230: S78 => S9 + S54; __reverse_v9_local2*S78;
  R231: S79 => S9 + S55; __reverse_v9_local2*S79;
  R232: S61 => SOS_grb2 + S60; _v12_local1*S61;
  R233: S63 => SOS_grb2 + S62; _v12_local2*S63;
  R234: S65 => SOS_grb2 + S64; _v12_local2*S65;
  R235: S67 => SOS_grb2 + S66; _v12_local2*S67;
  R236: S69 => SOS_grb2 + S68; _v12_local2*S69;
  R237: S71 => SOS_grb2 + S70; _v12_local1*S71;
  R238: S73 => SOS_grb2 + S72; _v12_local1*S73;
  R239: S75 => SOS_grb2 + S74; _v12_local2*S75;
  R240: S77 => SOS_grb2 + S76; _v12_local1*S77;
  R241: S78 => SOS_grb2 + S76; _v12_local2*S78;
  R242: S79 => SOS_grb2 + S77; _v12_local2*S79;
  R243: S79 => SOS_grb2 + S78; _v12_local1*S79;
  R244: S83 => SOS_grb2 + S82; _v12_local1*S83;
  R245: S85 => SOS_grb2 + S84; _v12_local1*S85;
  R246: SOS_grb2 + S60 => S61; __reverse_v12_local1*SOS_grb2*S60;
  R247: SOS_grb2 + S62 => S63; __reverse_v12_local2*SOS_grb2*S62;
  R248: SOS_grb2 + S64 => S65; __reverse_v12_local2*SOS_grb2*S64;
  R249: SOS_grb2 + S66 => S67; __reverse_v12_local2*SOS_grb2*S66;
  R250: SOS_grb2 + S68 => S69; __reverse_v12_local2*SOS_grb2*S68;
  R251: SOS_grb2 + S70 => S71; __reverse_v12_local1*SOS_grb2*S70;
  R252: SOS_grb2 + S72 => S73; __reverse_v12_local1*SOS_grb2*S72;
  R253: SOS_grb2 + S74 => S75; __reverse_v12_local2*SOS_grb2*S74;
  R254: SOS_grb2 + S76 => S78; __reverse_v12_local2*SOS_grb2*S76;
  R255: SOS_grb2 + S76 => S77; __reverse_v12_local1*SOS_grb2*S76;
  R256: SOS_grb2 + S77 => S79; __reverse_v12_local2*SOS_grb2*S77;
  R257: SOS_grb2 + S78 => S79; __reverse_v12_local1*SOS_grb2*S78;
  R258: SOS_grb2 + S82 => S83; __reverse_v12_local1*SOS_grb2*S82;
  R259: SOS_grb2 + S84 => S85; __reverse_v12_local1*SOS_grb2*S84;
  R260: PLCg_egfr_p_0_p_i_0 + S60 => S90; __R2_local1*PLCg_egfr_p_0_p_i_0*S60;
  R261: PLCg_egfr_p_0_p_i_0 + S61 => S91; __R2_local1*PLCg_egfr_p_0_p_i_0*S61;
  R262: PLCg_egfr_p_0_p_i_0 + S62 => S96; __R2_local1*PLCg_egfr_p_0_p_i_0*S62;
  R263: PLCg_egfr_p_0_p_i_0 + S63 => S97; __R2_local1*PLCg_egfr_p_0_p_i_0*S63;
  R264: PLCg_egfr_p_0_p_i_0 + S64 => S98; __R2_local1*PLCg_egfr_p_0_p_i_0*S64;
  R265: PLCg_egfr_p_0_p_i_0 + S65 => S99; __R2_local1*PLCg_egfr_p_0_p_i_0*S65;
  R266: S74 => PLCg_egfr_p_0_p_i_0 + S44; __reverse__R2_local1*S74;
  R267: S75 => PLCg_egfr_p_0_p_i_0 + S45; __reverse__R2_local1*S75;
  R268: S80 => PLCg_egfr_p_0_p_i_0 + S42; __reverse__R2_local1*S80;
  R269: S81 => PLCg_egfr_p_0_p_i_0 + S43; __reverse__R2_local1*S81;
  R270: Grb2_egfr_shc_sos + S60 => S92; __R3_local1*Grb2_egfr_shc_sos*S60;
  R271: Grb2_egfr_shc_sos_1_SOS_grb2_1 + S60 => S93; __R3_local2*Grb2_egfr_shc_sos_1_SOS_grb2_1*S60;
  R272: Grb2_egfr_shc_sos + S61 => S94; __R3_local1*Grb2_egfr_shc_sos*S61;
  R273: Grb2_egfr_shc_sos_1_SOS_grb2_1 + S61 => S95; __R3_local2*Grb2_egfr_shc_sos_1_SOS_grb2_1*S61;
  R274: Grb2_egfr_shc_sos + S62 => S100; __R3_local1*Grb2_egfr_shc_sos*S62;
  R275: Grb2_egfr_shc_sos_1_SOS_grb2_1 + S62 => S101; __R3_local2*Grb2_egfr_shc_sos_1_SOS_grb2_1*S62;
  R276: Grb2_egfr_shc_sos + S63 => S102; __R3_local1*Grb2_egfr_shc_sos*S63;
  R277: Grb2_egfr_shc_sos_1_SOS_grb2_1 + S63 => S103; __R3_local2*Grb2_egfr_shc_sos_1_SOS_grb2_1*S63;
  R278: Grb2_egfr_shc_sos + S64 => S104; __R3_local1*Grb2_egfr_shc_sos*S64;
  R279: Grb2_egfr_shc_sos_1_SOS_grb2_1 + S64 => S105; __R3_local2*Grb2_egfr_shc_sos_1_SOS_grb2_1*S64;
  R280: Grb2_egfr_shc_sos + S65 => S106; __R3_local1*Grb2_egfr_shc_sos*S65;
  R281: Grb2_egfr_shc_sos_1_SOS_grb2_1 + S65 => S107; __R3_local2*Grb2_egfr_shc_sos_1_SOS_grb2_1*S65;
  R282: S76 => Grb2_egfr_shc_sos + S44; __reverse__R3_local1*S76;
  R283: S77 => Grb2_egfr_shc_sos_1_SOS_grb2_1 + S44; __reverse__R3_local2*S77;
  R284: S78 => Grb2_egfr_shc_sos + S45; __reverse__R3_local1*S78;
  R285: S79 => Grb2_egfr_shc_sos_1_SOS_grb2_1 + S45; __reverse__R3_local2*S79;
  R286: S82 => Grb2_egfr_shc_sos + S42; __reverse__R3_local1*S82;
  R287: S83 => Grb2_egfr_shc_sos_1_SOS_grb2_1 + S42; __reverse__R3_local2*S83;
  R288: S84 => Grb2_egfr_shc_sos + S43; __reverse__R3_local1*S84;
  R289: S85 => Grb2_egfr_shc_sos_1_SOS_grb2_1 + S43; __reverse__R3_local2*S85;
  R290: Shc_egfr_grb2_p_0 + S60 => S86; __R4_local1*Shc_egfr_grb2_p_0*S60;
  R291: Shc_egfr_grb2_p_0 + S61 => S87; __R4_local1*Shc_egfr_grb2_p_0*S61;
  R292: Shc_egfr_grb2_p_0 + S74 => S96; __R4_local1*Shc_egfr_grb2_p_0*S74;
  R293: Shc_egfr_grb2_p_0 + S75 => S97; __R4_local1*Shc_egfr_grb2_p_0*S75;
  R294: Shc_egfr_grb2_p_0 + S76 => S100; __R4_local1*Shc_egfr_grb2_p_0*S76;
  R295: Shc_egfr_grb2_p_0 + S77 => S101; __R4_local1*Shc_egfr_grb2_p_0*S77;
  R296: Shc_egfr_grb2_p_0 + S78 => S102; __R4_local1*Shc_egfr_grb2_p_0*S78;
  R297: Shc_egfr_grb2_p_0 + S79 => S103; __R4_local1*Shc_egfr_grb2_p_0*S79;
  R298: S62 => Shc_egfr_grb2_p_0 + S44; __reverse__R4_local1*S62;
  R299: S63 => Shc_egfr_grb2_p_0 + S45; __reverse__R4_local1*S63;
  R300: S66 => Shc_egfr_grb2_p_0 + S46; __reverse__R4_local1*S66;
  R301: S67 => Shc_egfr_grb2_p_0 + S47; __reverse__R4_local1*S67;
  R302: S70 => Shc_egfr_grb2_p_0 + S48; __reverse__R4_local1*S70;
  R303: S71 => Shc_egfr_grb2_p_0 + S49; __reverse__R4_local1*S71;
  R304: PLCg_egfr_p_0_p_i_0 + S60 => S88; __R6_local1*PLCg_egfr_p_0_p_i_0*S60;
  R305: PLCg_egfr_p_0_p_i_0 + S61 => S89; __R6_local1*PLCg_egfr_p_0_p_i_0*S61;
  R306: PLCg_egfr_p_0_p_i_0 + S74 => S98; __R6_local1*PLCg_egfr_p_0_p_i_0*S74;
  R307: PLCg_egfr_p_0_p_i_0 + S75 => S99; __R6_local1*PLCg_egfr_p_0_p_i_0*S75;
  R308: PLCg_egfr_p_0_p_i_0 + S76 => S104; __R6_local1*PLCg_egfr_p_0_p_i_0*S76;
  R309: PLCg_egfr_p_0_p_i_0 + S77 => S105; __R6_local1*PLCg_egfr_p_0_p_i_0*S77;
  R310: PLCg_egfr_p_0_p_i_0 + S78 => S106; __R6_local1*PLCg_egfr_p_0_p_i_0*S78;
  R311: PLCg_egfr_p_0_p_i_0 + S79 => S107; __R6_local1*PLCg_egfr_p_0_p_i_0*S79;
  R312: S64 => PLCg_egfr_p_0_p_i_0 + S44; __reverse__R6_local1*S64;
  R313: S65 => PLCg_egfr_p_0_p_i_0 + S45; __reverse__R6_local1*S65;
  R314: S68 => PLCg_egfr_p_0_p_i_0 + S46; __reverse__R6_local1*S68;
  R315: S69 => PLCg_egfr_p_0_p_i_0 + S47; __reverse__R6_local1*S69;
  R316: S72 => PLCg_egfr_p_0_p_i_0 + S48; __reverse__R6_local1*S72;
  R317: S73 => PLCg_egfr_p_0_p_i_0 + S49; __reverse__R6_local1*S73;
  R318: S86 => S9 + S70; __reverse_v13_local1*S86;
  R319: S87 => S9 + S71; __reverse_v13_local1*S87;
  R320: S88 => S9 + S72; __reverse_v13_local1*S88;
  R321: S89 => S9 + S73; __reverse_v13_local1*S89;
  R322: S86 => S66; r14_k14f*S86;
  R323: S87 => S67; r14_k14f*S87;
  R324: S88 => S68; r14_k14f*S88;
  R325: S89 => S69; r14_k14f*S89;
  R326: S90 => S9 + S80; __reverse_v9_local1*S90;
  R327: S91 => S9 + S81; __reverse_v9_local2*S91;
  R328: S92 => S9 + S82; __reverse_v9_local1*S92;
  R329: S93 => S9 + S83; __reverse_v9_local1*S93;
  R330: S94 => S9 + S84; __reverse_v9_local2*S94;
  R331: S95 => S9 + S85; __reverse_v9_local2*S95;
  R332: S87 => SOS_grb2 + S86; _v12_local1*S87;
  R333: S89 => SOS_grb2 + S88; _v12_local1*S89;
  R334: S91 => SOS_grb2 + S90; _v12_local1*S91;
  R335: S93 => SOS_grb2 + S92; _v12_local1*S93;
  R336: S94 => SOS_grb2 + S92; _v12_local1*S94;
  R337: S95 => SOS_grb2 + S93; _v12_local1*S95;
  R338: S95 => SOS_grb2 + S94; _v12_local1*S95;
  R339: S97 => SOS_grb2 + S96; _v12_local2*S97;
  R340: S99 => SOS_grb2 + S98; _v12_local2*S99;
  R341: S101 => SOS_grb2 + S100; _v12_local1*S101;
  R342: S102 => SOS_grb2 + S100; _v12_local2*S102;
  R343: S103 => SOS_grb2 + S101; _v12_local2*S103;
  R344: S103 => SOS_grb2 + S102; _v12_local1*S103;
  R345: S105 => SOS_grb2 + S104; _v12_local1*S105;
  R346: S106 => SOS_grb2 + S104; _v12_local2*S106;
  R347: S107 => SOS_grb2 + S105; _v12_local2*S107;
  R348: S107 => SOS_grb2 + S106; _v12_local1*S107;
  R349: SOS_grb2 + S86 => S87; __reverse_v12_local1*SOS_grb2*S86;
  R350: SOS_grb2 + S88 => S89; __reverse_v12_local1*SOS_grb2*S88;
  R351: SOS_grb2 + S90 => S91; __reverse_v12_local1*SOS_grb2*S90;
  R352: SOS_grb2 + S92 => S94; __reverse_v12_local1*SOS_grb2*S92;
  R353: SOS_grb2 + S92 => S93; __reverse_v12_local1*SOS_grb2*S92;
  R354: SOS_grb2 + S93 => S95; __reverse_v12_local1*SOS_grb2*S93;
  R355: SOS_grb2 + S94 => S95; __reverse_v12_local1*SOS_grb2*S94;
  R356: SOS_grb2 + S96 => S97; __reverse_v12_local2*SOS_grb2*S96;
  R357: SOS_grb2 + S98 => S99; __reverse_v12_local2*SOS_grb2*S98;
  R358: SOS_grb2 + S100 => S102; __reverse_v12_local2*SOS_grb2*S100;
  R359: SOS_grb2 + S100 => S101; __reverse_v12_local1*SOS_grb2*S100;
  R360: SOS_grb2 + S101 => S103; __reverse_v12_local2*SOS_grb2*S101;
  R361: SOS_grb2 + S102 => S103; __reverse_v12_local1*SOS_grb2*S102;
  R362: SOS_grb2 + S104 => S106; __reverse_v12_local2*SOS_grb2*S104;
  R363: SOS_grb2 + S104 => S105; __reverse_v12_local1*SOS_grb2*S104;
  R364: SOS_grb2 + S105 => S107; __reverse_v12_local2*SOS_grb2*S105;
  R365: SOS_grb2 + S106 => S107; __reverse_v12_local1*SOS_grb2*S106;
  R366: PLCg_egfr_p_0_p_i_0 + S86 => S108; __R2_local1*PLCg_egfr_p_0_p_i_0*S86;
  R367: PLCg_egfr_p_0_p_i_0 + S87 => S109; __R2_local1*PLCg_egfr_p_0_p_i_0*S87;
  R368: PLCg_egfr_p_0_p_i_0 + S88 => S110; __R2_local1*PLCg_egfr_p_0_p_i_0*S88;
  R369: PLCg_egfr_p_0_p_i_0 + S89 => S111; __R2_local1*PLCg_egfr_p_0_p_i_0*S89;
  R370: S90 => PLCg_egfr_p_0_p_i_0 + S60; __reverse__R2_local1*S90;
  R371: S91 => PLCg_egfr_p_0_p_i_0 + S61; __reverse__R2_local1*S91;
  R372: S96 => PLCg_egfr_p_0_p_i_0 + S62; __reverse__R2_local1*S96;
  R373: S97 => PLCg_egfr_p_0_p_i_0 + S63; __reverse__R2_local1*S97;
  R374: S98 => PLCg_egfr_p_0_p_i_0 + S64; __reverse__R2_local1*S98;
  R375: S99 => PLCg_egfr_p_0_p_i_0 + S65; __reverse__R2_local1*S99;
  R376: Grb2_egfr_shc_sos + S86 => S112; __R3_local1*Grb2_egfr_shc_sos*S86;
  R377: Grb2_egfr_shc_sos_1_SOS_grb2_1 + S86 => S113; __R3_local2*Grb2_egfr_shc_sos_1_SOS_grb2_1*S86;
  R378: Grb2_egfr_shc_sos + S87 => S114; __R3_local1*Grb2_egfr_shc_sos*S87;
  R379: Grb2_egfr_shc_sos_1_SOS_grb2_1 + S87 => S115; __R3_local2*Grb2_egfr_shc_sos_1_SOS_grb2_1*S87;
  R380: Grb2_egfr_shc_sos + S88 => S116; __R3_local1*Grb2_egfr_shc_sos*S88;
  R381: Grb2_egfr_shc_sos_1_SOS_grb2_1 + S88 => S117; __R3_local2*Grb2_egfr_shc_sos_1_SOS_grb2_1*S88;
  R382: Grb2_egfr_shc_sos + S89 => S118; __R3_local1*Grb2_egfr_shc_sos*S89;
  R383: Grb2_egfr_shc_sos_1_SOS_grb2_1 + S89 => S119; __R3_local2*Grb2_egfr_shc_sos_1_SOS_grb2_1*S89;
  R384: S92 => Grb2_egfr_shc_sos + S60; __reverse__R3_local1*S92;
  R385: S93 => Grb2_egfr_shc_sos_1_SOS_grb2_1 + S60; __reverse__R3_local2*S93;
  R386: S94 => Grb2_egfr_shc_sos + S61; __reverse__R3_local1*S94;
  R387: S95 => Grb2_egfr_shc_sos_1_SOS_grb2_1 + S61; __reverse__R3_local2*S95;
  R388: S100 => Grb2_egfr_shc_sos + S62; __reverse__R3_local1*S100;
  R389: S101 => Grb2_egfr_shc_sos_1_SOS_grb2_1 + S62; __reverse__R3_local2*S101;
  R390: S102 => Grb2_egfr_shc_sos + S63; __reverse__R3_local1*S102;
  R391: S103 => Grb2_egfr_shc_sos_1_SOS_grb2_1 + S63; __reverse__R3_local2*S103;
  R392: S104 => Grb2_egfr_shc_sos + S64; __reverse__R3_local1*S104;
  R393: S105 => Grb2_egfr_shc_sos_1_SOS_grb2_1 + S64; __reverse__R3_local2*S105;
  R394: S106 => Grb2_egfr_shc_sos + S65; __reverse__R3_local1*S106;
  R395: S107 => Grb2_egfr_shc_sos_1_SOS_grb2_1 + S65; __reverse__R3_local2*S107;
  R396: Shc_egfr_grb2_p_0 + S90 => S108; __R4_local1*Shc_egfr_grb2_p_0*S90;
  R397: Shc_egfr_grb2_p_0 + S91 => S109; __R4_local1*Shc_egfr_grb2_p_0*S91;
  R398: Shc_egfr_grb2_p_0 + S92 => S112; __R4_local1*Shc_egfr_grb2_p_0*S92;
  R399: Shc_egfr_grb2_p_0 + S93 => S113; __R4_local1*Shc_egfr_grb2_p_0*S93;
  R400: Shc_egfr_grb2_p_0 + S94 => S114; __R4_local1*Shc_egfr_grb2_p_0*S94;
  R401: Shc_egfr_grb2_p_0 + S95 => S115; __R4_local1*Shc_egfr_grb2_p_0*S95;
  R402: S86 => Shc_egfr_grb2_p_0 + S60; __reverse__R4_local1*S86;
  R403: S87 => Shc_egfr_grb2_p_0 + S61; __reverse__R4_local1*S87;
  R404: S96 => Shc_egfr_grb2_p_0 + S74; __reverse__R4_local1*S96;
  R405: S97 => Shc_egfr_grb2_p_0 + S75; __reverse__R4_local1*S97;
  R406: S100 => Shc_egfr_grb2_p_0 + S76; __reverse__R4_local1*S100;
  R407: S101 => Shc_egfr_grb2_p_0 + S77; __reverse__R4_local1*S101;
  R408: S102 => Shc_egfr_grb2_p_0 + S78; __reverse__R4_local1*S102;
  R409: S103 => Shc_egfr_grb2_p_0 + S79; __reverse__R4_local1*S103;
  R410: PLCg_egfr_p_0_p_i_0 + S90 => S110; __R6_local1*PLCg_egfr_p_0_p_i_0*S90;
  R411: PLCg_egfr_p_0_p_i_0 + S91 => S111; __R6_local1*PLCg_egfr_p_0_p_i_0*S91;
  R412: PLCg_egfr_p_0_p_i_0 + S92 => S116; __R6_local1*PLCg_egfr_p_0_p_i_0*S92;
  R413: PLCg_egfr_p_0_p_i_0 + S93 => S117; __R6_local1*PLCg_egfr_p_0_p_i_0*S93;
  R414: PLCg_egfr_p_0_p_i_0 + S94 => S118; __R6_local1*PLCg_egfr_p_0_p_i_0*S94;
  R415: PLCg_egfr_p_0_p_i_0 + S95 => S119; __R6_local1*PLCg_egfr_p_0_p_i_0*S95;
  R416: S88 => PLCg_egfr_p_0_p_i_0 + S60; __reverse__R6_local1*S88;
  R417: S89 => PLCg_egfr_p_0_p_i_0 + S61; __reverse__R6_local1*S89;
  R418: S98 => PLCg_egfr_p_0_p_i_0 + S74; __reverse__R6_local1*S98;
  R419: S99 => PLCg_egfr_p_0_p_i_0 + S75; __reverse__R6_local1*S99;
  R420: S104 => PLCg_egfr_p_0_p_i_0 + S76; __reverse__R6_local1*S104;
  R421: S105 => PLCg_egfr_p_0_p_i_0 + S77; __reverse__R6_local1*S105;
  R422: S106 => PLCg_egfr_p_0_p_i_0 + S78; __reverse__R6_local1*S106;
  R423: S107 => PLCg_egfr_p_0_p_i_0 + S79; __reverse__R6_local1*S107;
  R424: S109 => SOS_grb2 + S108; _v12_local1*S109;
  R425: S111 => SOS_grb2 + S110; _v12_local1*S111;
  R426: S113 => SOS_grb2 + S112; _v12_local1*S113;
  R427: S114 => SOS_grb2 + S112; _v12_local1*S114;
  R428: S115 => SOS_grb2 + S113; _v12_local1*S115;
  R429: S115 => SOS_grb2 + S114; _v12_local1*S115;
  R430: S117 => SOS_grb2 + S116; _v12_local1*S117;
  R431: S118 => SOS_grb2 + S116; _v12_local1*S118;
  R432: S119 => SOS_grb2 + S117; _v12_local1*S119;
  R433: S119 => SOS_grb2 + S118; _v12_local1*S119;
  R434: SOS_grb2 + S108 => S109; __reverse_v12_local1*SOS_grb2*S108;
  R435: SOS_grb2 + S110 => S111; __reverse_v12_local1*SOS_grb2*S110;
  R436: SOS_grb2 + S112 => S114; __reverse_v12_local1*SOS_grb2*S112;
  R437: SOS_grb2 + S112 => S113; __reverse_v12_local1*SOS_grb2*S112;
  R438: SOS_grb2 + S113 => S115; __reverse_v12_local1*SOS_grb2*S113;
  R439: SOS_grb2 + S114 => S115; __reverse_v12_local1*SOS_grb2*S114;
  R440: SOS_grb2 + S116 => S118; __reverse_v12_local1*SOS_grb2*S116;
  R441: SOS_grb2 + S116 => S117; __reverse_v12_local1*SOS_grb2*S116;
  R442: SOS_grb2 + S117 => S119; __reverse_v12_local1*SOS_grb2*S117;
  R443: SOS_grb2 + S118 => S119; __reverse_v12_local1*SOS_grb2*S118;
  R444: S108 => PLCg_egfr_p_0_p_i_0 + S86; __reverse__R2_local1*S108;
  R445: S109 => PLCg_egfr_p_0_p_i_0 + S87; __reverse__R2_local1*S109;
  R446: S110 => PLCg_egfr_p_0_p_i_0 + S88; __reverse__R2_local1*S110;
  R447: S111 => PLCg_egfr_p_0_p_i_0 + S89; __reverse__R2_local1*S111;
  R448: S112 => Grb2_egfr_shc_sos + S86; __reverse__R3_local1*S112;
  R449: S113 => Grb2_egfr_shc_sos_1_SOS_grb2_1 + S86; __reverse__R3_local2*S113;
  R450: S114 => Grb2_egfr_shc_sos + S87; __reverse__R3_local1*S114;
  R451: S115 => Grb2_egfr_shc_sos_1_SOS_grb2_1 + S87; __reverse__R3_local2*S115;
  R452: S116 => Grb2_egfr_shc_sos + S88; __reverse__R3_local1*S116;
  R453: S117 => Grb2_egfr_shc_sos_1_SOS_grb2_1 + S88; __reverse__R3_local2*S117;
  R454: S118 => Grb2_egfr_shc_sos + S89; __reverse__R3_local1*S118;
  R455: S119 => Grb2_egfr_shc_sos_1_SOS_grb2_1 + S89; __reverse__R3_local2*S119;
  R456: S108 => Shc_egfr_grb2_p_0 + S90; __reverse__R4_local1*S108;
  R457: S109 => Shc_egfr_grb2_p_0 + S91; __reverse__R4_local1*S109;
  R458: S112 => Shc_egfr_grb2_p_0 + S92; __reverse__R4_local1*S112;
  R459: S113 => Shc_egfr_grb2_p_0 + S93; __reverse__R4_local1*S113;
  R460: S114 => Shc_egfr_grb2_p_0 + S94; __reverse__R4_local1*S114;
  R461: S115 => Shc_egfr_grb2_p_0 + S95; __reverse__R4_local1*S115;
  R462: S110 => PLCg_egfr_p_0_p_i_0 + S90; __reverse__R6_local1*S110;
  R463: S111 => PLCg_egfr_p_0_p_i_0 + S91; __reverse__R6_local1*S111;
  R464: S116 => PLCg_egfr_p_0_p_i_0 + S92; __reverse__R6_local1*S116;
  R465: S117 => PLCg_egfr_p_0_p_i_0 + S93; __reverse__R6_local1*S117;
  R466: S118 => PLCg_egfr_p_0_p_i_0 + S94; __reverse__R6_local1*S118;
  R467: S119 => PLCg_egfr_p_0_p_i_0 + S95; __reverse__R6_local1*S119;

  // Unit definitions:
  unit substance = item;
end
